// SBML level 3 version 1

model Mg_model()

  // Compartments:
  compartment comp1 = 1;

  // Species:
  species Mg_e in comp1 = 0.8/comp1;
  species Mg_f in comp1 = 0.8/comp1;
  species TRPM in comp1 = 1/comp1;
  species ATP in comp1 = 4.420049/comp1;
  species Mg_ATP in comp1 = 17.57597/comp1;
  species $Mg in comp1;
  species Mg_IM in comp1 = 0.1293189/comp1;
  species TRPM_n in comp1 = 1/comp1;
  species $cons in comp1 = 0;
  species $ATP_prod in comp1 = 1;
  species $TRPM_prod in comp1 = 1;
  species $nMg in comp1;
  species $nMg_f in comp1;
  species $IM in comp1 = 1.019974;
  species M7CK in comp1 = 1/comp1;
  species M7CK_n in comp1 = 1/comp1;
  species $deg in comp1 = 0;
  species $H3S10 in comp1 = 1;
  species pH3S10 in comp1 = 1/comp1;
  species $nMg_IM in comp1;
  species $nMg_ATP in comp1;
  species $h3s10_prod in comp1 = 1;

  // Parameters:
  Mg_0 = Mg_f + Mg_ATP + Mg_IM;
  Mg_f_0 = Mg_f;
  Mg_IM_0 = Mg_IM;
  Mg_ATP_0 = Mg_ATP;
  pH3S10_0 = pH3S10;
  TRPM_0 = TRPM;
  TRPM_n_0 = TRPM_n;
  M7CK_n_0 = M7CK_n;
  ATP_0 = ATP;
  k_m_i = 0.3541188;
  k_atp_p0 = 0.002255125;
  k_atp_pm = 8.491754;
  k_atp_c = 0.5901245;
  k_matp_b = 0.8632245;
  k_matp_ub = 0.4525248;
  k_mim_b = 0.1598112;
  k_mim_ub = 0.9897382;
  k_ntrpm_p = 0.001011131;
  n_ntrpm_p = 2.303172;
  k_ntrpm_t = 0.7410061;
  k_trpm_s = 0.9968438;
  k_m7ck_t1 = 0.9219271;
  k_m7ck_t2 = 0.7127451;
  k_m7ck_deg = 0.9623776;
  k_h3s10_p = 7.035444;
  k_h3s10_d = 0.7221698;
  k_h3s10_a = 0.9589421;
  k_h3s10_da = 0.807474;
  IM_prod = 1;
  Mg_e_0 = Mg_e;
  n_h3s10_a = 0.7377167;

  // Assignment rules:
  Mg := Mg_f + Mg_ATP + Mg_IM;
  nMg := Mg/Mg_0;
  nMg_f := Mg_f/Mg_f_0;
  nMg_IM := Mg_IM/Mg_IM_0;
  nMg_ATP := Mg_ATP/Mg_ATP_0;
  npH3S10 := pH3S10/pH3S10_0;
  nTRPM := TRPM/TRPM_0;
  nTRPM_n := TRPM_n/TRPM_n_0;
  nM7CK_n := M7CK_n/M7CK_n_0;
  nATP := ATP/ATP_0;
  F_trpm_i := 1;

  // Reactions:
  M1_v1: Mg_e => Mg_f; k_m_i*(Mg_e - Mg_f)*(Mg_e > Mg_f);
  M1_v2: $ATP_prod + Mg_f => ATP + Mg_f; k_atp_p0 + k_atp_pm*Mg_f;
  M1_v3: ATP => $cons; k_atp_c*ATP;
  M1_v4: Mg_f + ATP -> Mg_ATP; k_matp_b*Mg_f*(Mg_f > 0)*ATP*(ATP > 0) - k_matp_ub*Mg_ATP*(Mg_ATP > 0);
  M1_v5: Mg_f + $IM -> Mg_IM; k_mim_b*Mg_f*(Mg_f > 0)*IM*(IM > 0) - k_mim_ub*Mg_IM*(Mg_IM > 0);
  M1_v6: $TRPM_prod + Mg_ATP => TRPM_n + Mg_ATP; k_ntrpm_p*TRPM_prod*Mg_ATP^n_ntrpm_p;
  M1_v7: TRPM_n => TRPM; k_ntrpm_t*TRPM_n;
  M1_v8: TRPM => M7CK; k_trpm_s*TRPM;
  M1_v9: M7CK -> M7CK_n; k_m7ck_t1*M7CK*(M7CK > 0) - k_m7ck_t2*M7CK_n*(M7CK_n > 0);
  M1_v10: M7CK => $deg; k_m7ck_deg*M7CK*(M7CK > 0);
  M1_v11: $h3s10_prod -> $H3S10; k_h3s10_p;
  M1_v12: $H3S10 -> $deg; k_h3s10_d*H3S10;
  M1_v13: $H3S10 + M7CK_n -> pH3S10 + M7CK_n; k_h3s10_a*H3S10*M7CK_n*(H3S10 > 0) - k_h3s10_da*pH3S10*(pH3S10 > 0);

  // Events:
  _E0: at (time > 0): Mg_f_0 = Mg_f;
  _E1: at (time > 0): pH3S10_0 = pH3S10;
  _E2: at (time > 0): Mg_0 = Mg_f + Mg_ATP + Mg_IM;
  _E3: at (time > 0): Mg_f_0 = Mg_f;
  _E4: at (time > 0): Mg_IM_0 = Mg_IM;
  _E5: at (time > 0): TRPM_0 = TRPM;
  _E6: at (time > 0): Mg_ATP_0 = Mg_ATP;
  _E7: at (time > 0): TRPM_n_0 = TRPM_n;
  _E8: at (time > 0): M7CK_n_0 = M7CK_n;
  _E9: at (time > 0): Mg_e_0 = Mg_e;
  _E10: at (time > 0): ATP_0 = ATP;
end
