// SBML level 3 version 1

model combined()

  // Compartments:
  compartment default_compartment = 1;
  compartment M1_comp1 = 1;
  compartment ZZ_comp1 = 1;

  // Species:
  species $Mg_e in M1_comp1 = 0.5;
  species M1_Mg_f in M1_comp1 = 0.5;
  species M1_TRPM in M1_comp1 = 1;
  species M1_ATP in M1_comp1 = 16;
  species M1_Mg_ATP in M1_comp1 = 9;
  species $M1_Mg in M1_comp1;
  species M1_Mg_IM in M1_comp1 = 9;
  species M1_nTRPM in M1_comp1 = 1;
  species $M1_cons in M1_comp1 = 0;
  species $M1_ATP_prod in M1_comp1 = 1;
  species $M1_TRPM_prod in M1_comp1 = 1;
  species M1_Mg_0 in M1_comp1 = M1_Mg_f + M1_Mg_ATP + M1_Mg_IM;
  species $M1_Mg_n in M1_comp1;
  species $M1_Mg_f_n in M1_comp1;
  species M1_Mg_f_0 in M1_comp1 = M1_Mg_f;
  species $M1_IM in M1_comp1 = 88.6098;
  species M1_M7CK in M1_comp1 = 1;
  species M1_nM7CK in M1_comp1 = 1;
  species $M1_deg in M1_comp1 = 0;
  species $M1_H3S10 in M1_comp1 = 1;
  species M1_pH3S10 in M1_comp1 = 1;
  species $M1_Mg_IM_n in M1_comp1;
  species $M1_Mg_ATP_n in M1_comp1;
  species M1_Mg_f_1 in M1_comp1 = 0.5;
  species M1_pH3S10_0 in M1_comp1 = M1_pH3S10;
  species ZZ_deg in ZZ_comp1 = 0;
  species ZZ_V165a in ZZ_comp1 = 1200;
  species ZZ_IFNG in ZZ_comp1 = 468;
  species ZZ_IFNGR_JAK in ZZ_comp1 = 17784; ZZ_IFNGR_JAK is "IFNGR/JAK";
  species ZZ_IFNG_R_JAK in ZZ_comp1 = 0; ZZ_IFNG_R_JAK is "IFNG/R/JAK";
  species ZZ_pIFNG_R_JAK in ZZ_comp1 = 0; ZZ_pIFNG_R_JAK is "pIFNG/R/JAK";
  species ZZ_STAT1 in ZZ_comp1 = 552129;
  species ZZ_pIFNG_R_JAK_STAT1 in ZZ_comp1 = 78; ZZ_pIFNG_R_JAK_STAT1 is "pIFNG/R/JAK/STAT1";
  species ZZ_pSTAT1 in ZZ_comp1 = 28;
  species ZZ_pSTAT1D in ZZ_comp1 = 36;
  species ZZ_pSTAT1D_n in ZZ_comp1 = 58;
  species ZZ_STAT1D_n in ZZ_comp1 = 36;
  species ZZ_STAT1_n in ZZ_comp1 = 1557;
  species $ZZ_SOCS1_prod in ZZ_comp1 = 1;
  species ZZ_SOCS1 in ZZ_comp1 = 5425;
  species ZZ_IFNG_R_JAK_SOCS1 in ZZ_comp1 = 10; ZZ_IFNG_R_JAK_SOCS1 is "IFNG/R/JAK/SOCS1";
  species ZZ_IFNG_R_lyso in ZZ_comp1 = 1; ZZ_IFNG_R_lyso is "IFNG/R_lyso";
  species ZZ_SOCS1_JAK in ZZ_comp1 = 4; ZZ_SOCS1_JAK is "SOCS1/JAK";
  species ZZ_IRF9 in ZZ_comp1 = 1589;
  species ZZ_IRF9_n in ZZ_comp1 = 15960;
  species ZZ_pSTAT1D_IRF9 in ZZ_comp1 = 7; ZZ_pSTAT1D_IRF9 is "pSTAT1D/IRF9";
  species ZZ_pSTAT1D_IRF9_n in ZZ_comp1 = 87; ZZ_pSTAT1D_IRF9_n is "pSTAT1D/IRF9_n";
  species $ZZ_CXCL10_prod in ZZ_comp1 = 1;
  species ZZ_SOCS3 in ZZ_comp1 = 2830;
  species ZZ_IFNG_R_JAK_SOCS3 in ZZ_comp1 = 3; ZZ_IFNG_R_JAK_SOCS3 is "IFNG/R/JAK/SOCS3";
  species ZZ_SOCS3_JAK in ZZ_comp1 = 8; ZZ_SOCS3_JAK is "SOCS3/JAK";
  species $ZZ_SOCS3_prod in ZZ_comp1 = 1;
  species ZZ_IL4 in ZZ_comp1 = 26;
  species ZZ_IL4R_JAK in ZZ_comp1 = 3068; ZZ_IL4R_JAK is "IL4R/JAK";
  species ZZ_IL4_R_JAK in ZZ_comp1 = 0; ZZ_IL4_R_JAK is "IL4/R/JAK";
  species ZZ_pIL4_R_JAK in ZZ_comp1 = 0; ZZ_pIL4_R_JAK is "pIL4/R/JAK";
  species ZZ_STAT6 in ZZ_comp1 = 59952;
  species ZZ_pIL4_R_JAK_STAT6 in ZZ_comp1 = 0; ZZ_pIL4_R_JAK_STAT6 is "pIL4/R/JAK/STAT6";
  species ZZ_pSTAT6 in ZZ_comp1 = 14;
  species ZZ_pSTAT6D in ZZ_comp1 = 0;
  species ZZ_pSTAT6D_n in ZZ_comp1 = 12;
  species ZZ_STAT6D_n in ZZ_comp1 = 0;
  species ZZ_STAT6_n in ZZ_comp1 = 5;
  species ZZ_IL4_R_JAK_SOCS1_i in ZZ_comp1 = 0; ZZ_IL4_R_JAK_SOCS1_i is "IL4/R/JAK/SOCS1_i";
  species ZZ_IL4_R_lyso in ZZ_comp1 = 0; ZZ_IL4_R_lyso is "IL4/R_lyso";
  species ZZ_IL4_R_JAK_SOCS3_i in ZZ_comp1 = 0; ZZ_IL4_R_JAK_SOCS3_i is "IL4/R/JAK/SOCS3_i";
  species ZZ_PTEN in ZZ_comp1 = 75355;
  species ZZ_IRF4 in ZZ_comp1 = 18703;
  species $ZZ_IRF4_prod in ZZ_comp1 = 1;
  species ZZ_IL10 in ZZ_comp1 = 900;
  species ZZ_JAK in ZZ_comp1 = 99122;
  species IFNGR in ZZ_comp1 = 93;
  species ZZ_IFNG_R in ZZ_comp1 = 1; ZZ_IFNG_R is "IFNG/R";
  species IL4R in ZZ_comp1 = 16;
  species ZZ_IL4_R in ZZ_comp1 = 0; ZZ_IL4_R is "IL4/R";
  species $ZZ_IL10_prod in ZZ_comp1 = 1;
  species $ZZ_ARG1_prod in ZZ_comp1 = 1;
  species ZZ_ARG1 in ZZ_comp1 = 1450000;
  species $ZZ_IL12_prod in ZZ_comp1 = 1;
  species $ZZ_CXCL9_prod in ZZ_comp1 = 1;
  species $ZZ_miR3473_prod in ZZ_comp1 = 1;
  species ZZ_m3473b in ZZ_comp1 = 477;
  species ZZ_mPTEN in ZZ_comp1 = 10;
  species ZZ_m3473b_mPTEN in ZZ_comp1 = 3; ZZ_m3473b_mPTEN is "m3473b/mPTEN";
  species $ZZ_IRF1_prod in ZZ_comp1 = 1;
  species $ZZ_iNOS_prod in ZZ_comp1 = 1;
  species ZZ_iNOS in ZZ_comp1 = 880;
  species ZZ_m93 in ZZ_comp1 = 1437;
  species ZZ_HIF1a in ZZ_comp1 = 1192;
  species ZZ_HIF2a in ZZ_comp1 = 752;
  species $ZZ_HIF1a_prod in ZZ_comp1 = 1;
  species $ZZ_HIF2a_prod in ZZ_comp1 = 1;
  species $ZZ_PPARG_prod in ZZ_comp1 = 1;
  species ZZ_PPARG in ZZ_comp1 = 1227;
  species ZZ_aPPARG in ZZ_comp1 = 873;
  species ZZ_HIF1b_n in ZZ_comp1 = 14868;
  species ZZ_HIF2a_n in ZZ_comp1 = 209;
  species ZZ_HIF1a_n in ZZ_comp1 = 331;
  species ZZ_HIF2a_b_n in ZZ_comp1 = 52; ZZ_HIF2a_b_n is "HIF2a/b_n";
  species ZZ_HIF1a_b_n in ZZ_comp1 = 82; ZZ_HIF1a_b_n is "HIF1a/b_n";
  species ZZ_IRF1 in ZZ_comp1 = 997;
  species ZZ_PHD in ZZ_comp1 = 12376;
  species $ZZ_O2 in ZZ_comp1 = 120400000;
  species ZZ_O2_aPHD in ZZ_comp1 = 1405; ZZ_O2_aPHD is "O2/aPHD";
  species ZZ_HIF1a_OH in ZZ_comp1 = 35;
  species ZZ_HIF2a_OH in ZZ_comp1 = 8;
  species ZZ_TNFa in ZZ_comp1 = 384;
  species ZZ_CXCL9 in ZZ_comp1 = 30;
  species ZZ_mIRF9 in ZZ_comp1 = 5;
  species ZZ_m93_mIRF9 in ZZ_comp1 = 5; ZZ_m93_mIRF9 is "m93/mIRF9";
  species $ZZ_IRF9_prod in ZZ_comp1 = 1;
  species $ZZ_PTEN_prod in ZZ_comp1 = 1;
  species $ZZ_VEGF_prod in ZZ_comp1 = 1;
  species $ZZ_IFNG_prod in ZZ_comp1 = 1;
  species ZZ_IL12 in ZZ_comp1 = 151;
  species $ZZ_PHD_prod in ZZ_comp1 = 1;
  species $ZZ_miR93_prod in ZZ_comp1 = 1;
  species $ZZ_IFNGR_prod in ZZ_comp1 = 1;
  species $ZZ_jak_prod in ZZ_comp1 = 1;
  species ZZ_aPHD in ZZ_comp1 = 17680;
  species ZZ_mCXCL10 in ZZ_comp1 = 2;
  species ZZ_pIL4_R_JAK_i in ZZ_comp1 = 0; ZZ_pIL4_R_JAK_i is "pIL4/R/JAK_i";
  species $ZZ_IL4_prod in ZZ_comp1 = 1;
  species ZZ_IL4_R_JAK_SOCS1 in ZZ_comp1 = 2; ZZ_IL4_R_JAK_SOCS1 is "IL4/R/JAK/SOCS1";
  species ZZ_IL4_R_JAK_SOCS3 in ZZ_comp1 = 0; ZZ_IL4_R_JAK_SOCS3 is "IL4/R/JAK/SOCS3";
  species $ZZ_TNFa_prod in ZZ_comp1 = 1;
  species $ZZ_il4r_prod in ZZ_comp1 = 1;
  species $ZZ_IRG1_prod in ZZ_comp1 = 1;
  species ZZ_IRG1 in ZZ_comp1 = 2450;
  species ZZ_Itaconate in ZZ_comp1 = 65000000;
  species $ZZ_Itaconate_prod in ZZ_comp1 = 1;
  species $ZZ_IRF9T in ZZ_comp1;
  species ZZ_STAT3 in ZZ_comp1 = 249039;
  species ZZ_pSTAT3 in ZZ_comp1 = 6;
  species ZZ_pSTAT3D in ZZ_comp1 = 2;
  species ZZ_pSTAT3D_n in ZZ_comp1 = 5;
  species ZZ_STAT3D_n in ZZ_comp1 = 2;
  species ZZ_STAT3_n in ZZ_comp1 = 81;
  species ZZ_pSTAT1_3 in ZZ_comp1 = 78; ZZ_pSTAT1_3 is "pSTAT1/3";
  species ZZ_pSTAT1_3_n in ZZ_comp1 = 775; ZZ_pSTAT1_3_n is "pSTAT1/3_n";
  species ZZ_PI3K in ZZ_comp1 = 3828;
  species ZZ_pPI3K in ZZ_comp1 = 173;
  species ZZ_AKT1 in ZZ_comp1 = 131577;
  species ZZ_AKT2 in ZZ_comp1 = 43860;
  species ZZ_pAKT1 in ZZ_comp1 = 18424;
  species ZZ_pAKT2 in ZZ_comp1 = 6141;
  species $ZZ_IL10R_prod in ZZ_comp1 = 1;
  species ZZ_IL10R in ZZ_comp1 = 4;
  species ZZ_IL10R_JAK in ZZ_comp1 = 759; ZZ_IL10R_JAK is "IL10R/JAK";
  species ZZ_IL10_R_JAK in ZZ_comp1 = 0; ZZ_IL10_R_JAK is "IL10/R/JAK";
  species ZZ_pIL10_R_JAK in ZZ_comp1 = 0; ZZ_pIL10_R_JAK is "pIL10/R/JAK";
  species ZZ_pIL10_R_JAK_STAT3 in ZZ_comp1 = 6; ZZ_pIL10_R_JAK_STAT3 is "pIL10/R/JAK/STAT3";
  species ZZ_IL10_R_lyso in ZZ_comp1 = 0; ZZ_IL10_R_lyso is "IL10/R_lyso";
  species ZZ_IL10_R_JAK_SOCS1 in ZZ_comp1 = 1; ZZ_IL10_R_JAK_SOCS1 is "IL10/R/JAK/SOCS1";
  species ZZ_IL10_R in ZZ_comp1 = 4; ZZ_IL10_R is "IL10/R";
  species $ZZ_pAKT_t in ZZ_comp1;
  species ZZ_mIL10 in ZZ_comp1 = 1;
  species $ZZ_STAT1_prod in ZZ_comp1 = 1;
  species $ZZ_miR146b_prod in ZZ_comp1 = 1;
  species ZZ_m146b in ZZ_comp1 = 131;
  species ZZ_pre_m146b in ZZ_comp1 = 66; ZZ_pre_m146b is "pre-m146b";
  species $ZZ_mir155_prod in ZZ_comp1 = 1;
  species ZZ_pre_m155 in ZZ_comp1 = 845; ZZ_pre_m155 is "pre-m155";
  species ZZ_m155 in ZZ_comp1 = 844;
  species $ZZ_cebpb_prod in ZZ_comp1 = 1;
  species ZZ_CEBPB in ZZ_comp1 = 98868;
  species ZZ_TNFR in ZZ_comp1 = 1405;
  species ZZ_TNFa_R in ZZ_comp1 = 8; ZZ_TNFa_R is "TNFa/R";
  species ZZ_TNFa_R_lyso in ZZ_comp1 = 0; ZZ_TNFa_R_lyso is "TNFa/R_lyso";
  species ZZ_RIP1 in ZZ_comp1 = 134379;
  species ZZ_aRIP1 in ZZ_comp1 = 886;
  species $ZZ_rip_prod in ZZ_comp1 = 1;
  species ZZ_A20 in ZZ_comp1 = 3000;
  species $ZZ_tnfr_prod in ZZ_comp1 = 1;
  species ZZ_TAK1 in ZZ_comp1 = 14869;
  species ZZ_pTAK1 in ZZ_comp1 = 132;
  species ZZ_p38 in ZZ_comp1 = 675778;
  species ZZ_pp38 in ZZ_comp1 = 10093;
  species ZZ_pp38_n in ZZ_comp1 = 14131;
  species ZZ_JNK in ZZ_comp1 = 14521;
  species ZZ_pJNK in ZZ_comp1 = 144;
  species ZZ_IKK in ZZ_comp1 = 100324;
  species ZZ_pIKK in ZZ_comp1 = 87;
  species $ZZ_ikk_prod in ZZ_comp1 = 1;
  species ZZ_pJNK_n in ZZ_comp1 = 337;
  species ZZ_ERK in ZZ_comp1 = 2000000;
  species ZZ_pERK in ZZ_comp1 = 706;
  species ZZ_pERK_n in ZZ_comp1 = 2470;
  species ZZ_VEGFR1 in ZZ_comp1 = 5200;
  species ZZ_V165a_R1 in ZZ_comp1 = 8; ZZ_V165a_R1 is "V165a/R1";
  species ZZ_pV165a_R1 in ZZ_comp1 = 3; ZZ_pV165a_R1 is "pV165a/R1";
  species ZZ_V165_R1_lyso in ZZ_comp1 = 18; ZZ_V165_R1_lyso is "V165/R1_lyso";
  species ZZ_V165b in ZZ_comp1 = 400;
  species ZZ_V165b_R1 in ZZ_comp1 = 20; ZZ_V165b_R1 is "V165b/R1";
  species ZZ_pV165a_R1_STAT3 in ZZ_comp1 = 11; ZZ_pV165a_R1_STAT3 is "pV165a/R1/STAT3";
  species $ZZ_R1_prod in ZZ_comp1 = 1;
  species ZZ_p65 in ZZ_comp1 = 75892;
  species ZZ_p50 in ZZ_comp1 = 4;
  species $ZZ_nfkb_prod in ZZ_comp1 = 1;
  species NFKB in ZZ_comp1 = 277;
  species nNFKB in ZZ_comp1 = 931;
  species ZZ_IKB_n in ZZ_comp1 = 25;
  species ZZ_IKB_NFKB_n in ZZ_comp1 = 29; ZZ_IKB_NFKB_n is "IKB/NFKB_n";
  species ZZ_IKB_NFKB in ZZ_comp1 = 68307; ZZ_IKB_NFKB is "IKB/NFKB";
  species IKB in ZZ_comp1 = 435;
  species $ZZ_Ikb_prod in ZZ_comp1 = 1;
  species ZZ_pIKB in ZZ_comp1 = 143;
  species ZZ_p50_n in ZZ_comp1 = 50;
  species ZZ_CREB in ZZ_comp1 = 75239;
  species ZZ_pCREB in ZZ_comp1 = 4761;
  species $ZZ_ap1_prod in ZZ_comp1 = 1;
  species ZZ_AP1_n in ZZ_comp1 = 864;
  species ZZ_INT1 in ZZ_comp1 = 995;
  species ZZ_aINT1 in ZZ_comp1 = 5;
  species $ZZ_egr2_prod in ZZ_comp1 = 1;
  species ZZ_EGR2 in ZZ_comp1 = 7100;
  species $ZZ_a20_prod in ZZ_comp1 = 1;
  species ZZ_INT2 in ZZ_comp1 = 995;
  species ZZ_aINT2 in ZZ_comp1 = 5;
  species $ZZ_il1b_prod in ZZ_comp1 = 1;
  species ZZ_IL1b in ZZ_comp1 = 845;
  species $ZZ_il1r_prod in ZZ_comp1 = 1;
  species ZZ_IL1R in ZZ_comp1 = 625;
  species ZZ_IL1b_R in ZZ_comp1 = 1; ZZ_IL1b_R is "IL1b/R";
  species ZZ_IRAK4 in ZZ_comp1 = 199999;
  species ZZ_IL1b_R_lyso in ZZ_comp1 = 0; ZZ_IL1b_R_lyso is "IL1b/R_lyso";
  species $ZZ_irak4_prod in ZZ_comp1 = 1;
  species ZZ_TRAF6 in ZZ_comp1 = 2995;
  species ZZ_IRF5 in ZZ_comp1 = 146962;
  species ZZ_aIRF5 in ZZ_comp1 = 3120;
  species ZZ_aTRAF6 in ZZ_comp1 = 5;
  species ZZ_IL1Ra in ZZ_comp1 = 11000;
  species ZZ_IL1Ra_R in ZZ_comp1 = 16; ZZ_IL1Ra_R is "IL1Ra/R";
  species $ZZ_il1ra_prod in ZZ_comp1 = 1;
  species ZZ_pIRAK4 in ZZ_comp1 = 1;
  species ZZ_GSK3b in ZZ_comp1 = 87270;
  species ZZ_pGSK3b in ZZ_comp1 = 52730;
  species deg in default_compartment = 0;
  species IL8_R in default_compartment = 1;
  species $IL8R_prod in default_compartment = 0;
  species IL8R in default_compartment = 1;
  species IL8 in default_compartment = 1;
  species $IL8_prod in default_compartment = 1;

  // Parameters:
  M1_Mg_IM_0 = M1_Mg_IM;
  M1_Mg_ATP_0 = M1_Mg_ATP;
  M1_k_m_i = 0.2537765;
  M1_k_m_e = 0.254913;
  M1_k_matp_b = 0.5857682;
  M1_n_matp_b = 0.02110402;
  M1_k_matp_ub = 0.9462731;
  M1_k_atp_c = 0.6221636;
  M1_k_ntrpm_t = 0.96;
  M1_n_ntrpm_t = 0.516;
  M1_k_atp_p0 = 9.814581;
  M1_k_atp_pm = 2.332337;
  M1_k_ntrpm_p = 0.11;
  M1_n_ntrpm_p = 12.22;
  M1_k_mim_b = 0.9531612;
  M1_n_mim_b = 8.196932;
  M1_k_mim_ub = 0.03924968;
  M1_k_trpm_s = 0.955;
  M1_k_m7ck_t1 = 0.83;
  M1_n_m7ck_t = 1.9;
  M1_k_m7ck_t2 = 0.96;
  M1_k_m7ck_deg = 0.89;
  M1_k_h3s10_p = 0.0008;
  M1_n_h3s10_p = 0.8;
  M1_k_h3s10_up = 0.0007;
  M1_k_ntrpm_d = 0.1;
  ZZ_k104 = 0.2086;
  ZZ_k119 = 2.672;
  ZZ_k33 = 0.007;
  ZZ_k86 = 50;
  ZZ_k87 = 0.0005;
  ZZ_kf39 = 4e-6;
  ZZ_kr40 = 0.002;
  ZZ_kf22 = 2.6e-6;
  ZZ_kr22 = 0.13;
  ZZ_kf102 = 0.6;
  ZZ_kr102 = 0.1;
  ZZ_k23 = 0.2;
  ZZ_k103 = 1;
  ZZ_k34 = 0.3;
  ZZ_k82 = 1;
  ZZ_kf24 = 0.1;
  ZZ_kr24 = 10;
  ZZ_k25 = 8;
  ZZ_kf11 = 0.008;
  ZZ_kr11 = 0.2;
  ZZ_k66 = 0.1;
  ZZ_kf35 = 0.0004;
  ZZ_k37 = 0.01;
  ZZ_k111 = 0.1;
  ZZ_kf27 = 0.002;
  ZZ_kr5 = 1;
  ZZ_k28 = 0.4;
  ZZ_k26 = 0.01;
  ZZ_k31 = 0.05;
  ZZ_k73 = 14184;
  ZZ_kb73 = 5;
  ZZ_k80 = 1.22;
  ZZ_k81 = 0.006;
  ZZ_kr39 = 0.002;
  ZZ_kf1 = 1.6e-7;
  ZZ_kf2 = 3;
  ZZ_kr2 = 10;
  ZZ_kf3 = 0.03;
  ZZ_kr3 = 3;
  ZZ_k4 = 2;
  ZZ_k12 = 0.1;
  ZZ_k21 = 1;
  ZZ_k13 = 0.03;
  ZZ_kf18 = 0.004;
  ZZ_kf5 = 0.1;
  ZZ_k6 = 1;
  ZZ_k7 = 0.03;
  ZZ_k9 = 0.1;
  ZZ_k54 = 192.86;
  ZZ_ka54 = 13000;
  ZZ_kb54 = 500;
  ZZ_k55 = 0.0057644;
  ZZ_kf58 = 0.005;
  ZZ_kr58 = 0.018;
  ZZ_kf60 = 5e-7;
  ZZ_kr60 = 0.03;
  ZZ_k74 = 606;
  ZZ_ka74 = 32600;
  ZZ_kb74 = 25400;
  ZZ_k75 = 0.0008;
  ZZ_kr94 = 0.1;
  ZZ_kf94 = 0.07;
  ZZ_kf62 = 7.14e-9;
  ZZ_kr62 = 10.8;
  ZZ_k63 = 1.33e-5;
  ZZ_k76 = 0.03;
  ZZ_k65 = 0.6;
  ZZ_k64 = 5e-6;
  ZZ_k52 = 204.54;
  ZZ_ka52 = 100;
  ZZ_k85 = 0.022;
  ZZ_k48 = 14.8;
  ZZ_ka48 = 40000;
  ZZ_k92 = 0.0012;
  ZZ_kf50 = 0.0001;
  ZZ_kr50 = 0.06;
  ZZ_k51 = 0.1;
  ZZ_k71 = 0.32;
  ZZ_k49 = 2.32;
  ZZ_k93 = 0.0003;
  ZZ_k88 = 0.003;
  ZZ_k79 = 9.9636;
  ZZ_ka79 = 0.05;
  ZZ_k90 = 0.0018;
  ZZ_k70 = 0.5;
  ZZ_k67 = 1.18;
  ZZ_k89 = 0.004;
  ZZ_kf14 = 0.00013;
  ZZ_kr14 = 1;
  ZZ_k15 = 0.1;
  ZZ_kr124 = 0.01;
  ZZ_k117 = 0.4;
  ZZ_k38 = 17100;
  ZZ_ka38 = 30000;
  ZZ_kb38 = 20000;
  ZZ_k84 = 0.0002;
  ZZ_k56 = 16.696;
  ZZ_ka56 = 200;
  ZZ_k57 = 1.45e-5;
  ZZ_k106 = 0.5;
  ZZ_k105 = 0.001;
  ZZ_k120 = 6.4e-12;
  ZZ_k121 = 0.00062;
  ZZ_k122 = 0.05;
  ZZ_k123 = 0.005;
  ZZ_k72 = 856.3;
  ZZ_ka72 = 6000;
  ZZ_k53 = 27.467;
  ZZ_ka53 = 4000;
  ZZ_kb53 = 82234;
  ZZ_k99 = 0.006;
  ZZ_k45 = 487.82;
  ZZ_ka45 = 10000;
  ZZ_kc45 = 5;
  ZZ_k98 = 0.0006;
  ZZ_k118 = 0.0074611;
  ZZ_ka118 = 2000000;
  ZZ_k44 = 8.74e-8;
  ZZ_k46 = 180.31;
  ZZ_k97 = 0.00033;
  ZZ_k47 = 1.67e-6;
  ZZ_k96 = 0.0002;
  ZZ_k17 = 7e-5;
  ZZ_k95 = 0.0035;
  ZZ_k101 = 0.004;
  ZZ_k20 = 82138;
  ZZ_ka20 = 6000;
  ZZ_k100 = 0.05;
  ZZ_k127 = 0.3;
  ZZ_kf125 = 0.1;
  ZZ_kr125 = 1;
  ZZ_k126 = 1;
  ZZ_k129 = 1;
  ZZ_kf131 = 1;
  ZZ_k133 = 0.1;
  ZZ_k134 = 0.005;
  ZZ_k135 = 5.1357;
  ZZ_k136 = 0.088;
  ZZ_k137 = 0.8;
  ZZ_k138 = 0.00013;
  ZZ_k140 = 0.01;
  ZZ_ka138 = 5000;
  ZZ_k142 = 0.04;
  ZZ_k155 = 0.006;
  ZZ_kf144 = 3e-7;
  ZZ_kr144 = 0.015;
  ZZ_kf145 = 4.0078;
  ZZ_kr145 = 0.1;
  ZZ_k148 = 0.1;
  ZZ_k150 = 0.1;
  ZZ_kf146 = 0.001;
  ZZ_kr146 = 2;
  ZZ_k147 = 7.5;
  ZZ_kb44 = 20;
  ZZ_k156 = 0.2;
  ZZ_k157 = 0.002;
  ZZ_k158 = 0.0004;
  ZZ_k159 = 800;
  ZZ_k161 = 0.0005;
  ZZ_k160 = 0.13083;
  ZZ_k163 = 0.001;
  ZZ_k162 = 0.003;
  ZZ_k166 = 0.001;
  ZZ_k165 = 0.003;
  ZZ_k167 = 0.001;
  ZZ_k164 = 1.27e-13;
  ZZ_ka164 = 20;
  ZZ_k168 = 0.003;
  ZZ_k169 = 7.13e-9;
  ZZ_ka169 = 100;
  ZZ_ka159 = 50;
  ZZ_k176 = 200;
  ZZ_k174 = 0.004;
  ZZ_kf170 = 1.7e-6;
  ZZ_kr170 = 0.021;
  ZZ_k171 = 0.1;
  ZZ_k173 = 1;
  ZZ_k172 = 1;
  ZZ_k175 = 0.001;
  ZZ_k179 = 1;
  ZZ_k180 = 6;
  ZZ_k181 = 6.2e-6;
  ZZ_k182 = 1;
  ZZ_k184 = 0.2;
  ZZ_k183 = 70;
  ZZ_ka183 = 10000;
  ZZ_k178 = 5.148;
  ZZ_k177 = 0.0005;
  ZZ_k185 = 0.7;
  ZZ_k188 = 0.5;
  ZZ_k186 = 1;
  ZZ_ka186 = 200;
  ZZ_k187 = 0.2;
  ZZ_k190 = 1;
  ZZ_k189 = 5e-8;
  ZZ_k191 = 100;
  ZZ_k192 = 5.2e-10;
  ZZ_k193 = 0.3;
  ZZ_k195 = 4.9739;
  ZZ_k198 = 0.1;
  ZZ_k197 = 0.2;
  ZZ_ka195 = 1000000;
  ZZ_kf199 = 1e-6;
  ZZ_kr199 = 0.005;
  ZZ_kf200 = 1;
  ZZ_kr200 = 0.5;
  ZZ_k201 = 2;
  ZZ_k202 = 0.5;
  ZZ_k203 = 1;
  ZZ_k204 = 20;
  ZZ_kf205 = 1e-5;
  ZZ_kr205 = 0.05;
  ZZ_k206 = 1;
  ZZ_kf207 = 4e-5;
  ZZ_kr207 = 2;
  ZZ_k208 = 1;
  ZZ_k209 = 9.35;
  ZZ_k210 = 0.0001;
  ZZ_k222 = 240;
  ZZ_kf216 = 0.001;
  ZZ_kr216 = 6e-5;
  ZZ_k217 = 0.8;
  ZZ_kf220 = 0.1;
  ZZ_kr220 = 0.8;
  ZZ_k219 = 0.1;
  ZZ_k223 = 1;
  ZZ_k221 = 0.2;
  ZZ_k224 = 0.010425;
  ZZ_kf215 = 0.001;
  ZZ_kr215 = 1;
  ZZ_k211 = 40;
  ZZ_k212 = 0.1;
  ZZ_k213 = 0.00046;
  ZZ_k214 = 0.00035;
  ZZ_k225 = 0.1;
  ZZ_k226 = 0.1;
  ZZ_ka222 = 10000000;
  ZZ_k228 = 3.9e-7;
  ZZ_k227 = 1e-7;
  ZZ_k229 = 0.012;
  ZZ_k230 = 0.048045;
  ZZ_kb164 = 6000;
  ZZ_kr1 = 0.01;
  ZZ_k231 = 0.00038;
  ZZ_k232 = 0.002;
  ZZ_k234 = 0.0015;
  ZZ_k233 = 292.31;
  ZZ_ka233 = 300;
  ZZ_kb169 = 2000;
  ZZ_k236 = 0.00024;
  ZZ_k235 = 0.01;
  ZZ_k238 = 0.00075;
  ZZ_k237 = 2.44e-8;
  ZZ_ka178 = 100000;
  ZZ_ka160 = 30;
  ZZ_kf242 = 1.75e-7;
  ZZ_kr242 = 0.1;
  ZZ_k241 = 0.0008;
  ZZ_k247 = 0.00035;
  ZZ_k240 = 5.485;
  ZZ_k239 = 5.2492;
  ZZ_k243 = 0.02;
  ZZ_k245 = 0.1;
  ZZ_k244 = 1;
  ZZ_k246 = 174;
  ZZ_k255 = 1e-5;
  ZZ_k256 = 1;
  ZZ_k249 = 1;
  ZZ_k248 = 3.18e-7;
  ZZ_k252 = 0.0001;
  ZZ_k251 = 30841;
  ZZ_ka248 = 300;
  ZZ_k254 = 0.0040925;
  ZZ_k253 = 0.002;
  ZZ_kb20 = 1000000;
  ZZ_ka224 = 5000;
  ZZ_kb248 = 100000;
  ZZ_kc248 = 20;
  ZZ_k258 = 0.1;
  ZZ_k257 = 1.04e-10;
  ZZ_ka230 = 5000;
  ZZ_ka240 = 100;
  ZZ_ka254 = 5000;
  ZZ_ka239 = 500000000;
  ZZ_ka246 = 1000;
  ZZ_kb254 = 20000;
  ZZ_kb118 = 5;
  ZZ_ka44 = 50000;
  ZZ_kc44 = 1000;
  ZZ_kd44 = 31396;
  ZZ_kb239 = 5;
  ZZ_ka119 = 500;
  ZZ_kd73 = 100000;
  ZZ_ke73 = 107000000;
  ZZ_kc73 = 1000;
  ZZ_ka73 = 300.02;
  ZZ_ka46 = 100000000;
  ZZ_kb46 = 30000;
  ZZ_kc46 = 100000;
  ZZ_kc239 = 1000;
  ZZ_kd46 = 2;
  ZZ_ke44 = 50000;
  ZZ_kf44 = 100;
  ZZ_kg44 = 500;
  ZZ_kf73 = 2;
  ZZ_ka251 = 1590000;
  ZZ_kb251 = 1000;
  ZZ_kc251 = 100;
  ZZ_kc72 = 10657;
  ZZ_kb72 = 500;
  ZZ_ka17 = 100000;
  ZZ_kc53 = 100000;
  ZZ_kd53 = 100000;
  ZZ_kb45 = 200000;
  ZZ_kd45 = 1000;
  ZZ_kd72 = 5000;
  ZZ_kb160 = 500000;
  ZZ_ka135 = 83.5;
  ZZ_kb135 = 76;
  ZZ_kc135 = 2;
  ZZ_kd135 = 1000;
  kd_ikb_d = 88.948;
  n_ikb_d = 23.43;
  kd_ikb_p = 1.207;
  n_ikb_p = 29.52;
  kd_ifngr_p1 = 1;
  IL8_R_0 = IL8_R;
  n_ifngr_p1 = 1;
  k_il8r_p = 0.1;
  k_il8r_d = 0.1;
  k_il8_b = 0.1;
  k_il8_ub = 0.1;
  k_il8_p = 0.1;
  kd_il8_p1 = 1;
  n_il8_p1 = 1;
  k_il8_d = 0.1;
  IL8_0 = IL8;
  IL8R_0 = IL8R;
  IFNGR_0 = IFNGR;
  IL4R_0 = IL4R;

  // Assignment rules:
  M1_Mg := M1_Mg_f + M1_Mg_ATP + M1_Mg_IM;
  M1_Mg_n := M1_Mg/M1_Mg_0;
  M1_Mg_f_n := M1_Mg_f/M1_Mg_f_0;
  M1_Mg_IM_n := M1_Mg_IM/M1_Mg_IM_0;
  M1_Mg_ATP_n := M1_Mg_ATP/M1_Mg_ATP_0;
  ZZ_IRF9T := ZZ_IRF9 + ZZ_IRF9_n + ZZ_pSTAT1D_IRF9 + ZZ_pSTAT1D_IRF9_n;
  ZZ_pAKT_t := ZZ_pAKT1 + ZZ_pAKT2;
  M1_F_trpm_i := 1;
  M1_F_mg_i := M1_Mg_0/M1_Mg;
  IL8_n := IL8/IL8_0;
  IL8R_n := IL8R/IL8R_0;
  nIFNGR := IFNGR/IFNGR_0;
  nIL4R := IL4R/IL4R_0;

  // Reactions:
  M1_Mg_transport: $Mg_e + M1_TRPM => M1_Mg_f + M1_TRPM; M1_k_m_i*Mg_e*(Mg_e > 0)*M1_F_mg_i*M1_F_trpm_i - M1_k_m_e*M1_Mg_f*(M1_Mg_f > 0);
  M1_Mg_ATP_binding: M1_Mg_f + M1_ATP => M1_Mg_ATP; M1_k_matp_b*M1_Mg_f^M1_n_matp_b*(M1_Mg_f > 0)*M1_ATP*(M1_ATP > 0) - M1_k_matp_ub*M1_Mg_ATP*(M1_Mg_ATP > 0); M1_Mg_ATP_binding is "Mg/ATP binding";
  M1_consumption: M1_ATP => $M1_cons; M1_k_atp_c*M1_ATP;
  M1_To_cytoplasm: M1_nTRPM => M1_TRPM; M1_k_ntrpm_t*M1_nTRPM^M1_n_ntrpm_t;
  M1_prod_ATP: $M1_ATP_prod + M1_Mg_f => M1_ATP + M1_Mg_f; M1_k_atp_p0 + M1_k_atp_pm*M1_Mg_f;
  M1_prod_TRPM: $M1_TRPM_prod + M1_Mg_ATP => M1_nTRPM + M1_Mg_ATP; M1_k_ntrpm_p*M1_TRPM_prod*(M1_Mg_ATP/M1_Mg_ATP_0)^M1_n_ntrpm_p;
  M1_Membrane_binding: M1_Mg_f + $M1_IM -> M1_Mg_IM; M1_k_mim_b*M1_Mg_f^M1_n_mim_b*(M1_Mg_f > 0)*M1_IM*(M1_IM > 0) - M1_k_mim_ub*M1_Mg_IM*(M1_Mg_IM > 0);
  M1_TRPM_seg: M1_TRPM => M1_M7CK; M1_k_trpm_s*M1_TRPM;
  M1_M7CK_trans: M1_M7CK -> M1_nM7CK; M1_k_m7ck_t1*M1_M7CK^M1_n_m7ck_t*(M1_M7CK > 0) - M1_k_m7ck_t2*M1_nM7CK*(M1_nM7CK > 0);
  M1_M7CK_deg: M1_M7CK => $M1_deg; M1_k_m7ck_deg*M1_M7CK;
  M1_H3S10_phos: $M1_H3S10 + M1_nM7CK -> M1_pH3S10 + M1_nM7CK; M1_k_h3s10_p*M1_H3S10*M1_nM7CK^M1_n_h3s10_p*(M1_H3S10 > 0) - M1_k_h3s10_up*M1_pH3S10*(M1_pH3S10 > 0);
  ZZ_v1: ZZ_IFNG + ZZ_IFNGR_JAK -> ZZ_IFNG_R_JAK; ZZ_kf1*ZZ_IFNG*ZZ_IFNGR_JAK - ZZ_kr1*ZZ_IFNG_R_JAK;
  ZZ_v2: ZZ_IFNG_R_JAK -> ZZ_pIFNG_R_JAK; ZZ_kf2*ZZ_IFNG_R_JAK - ZZ_kr2*ZZ_pIFNG_R_JAK;
  ZZ_v3: ZZ_STAT1 + ZZ_pIFNG_R_JAK -> ZZ_pIFNG_R_JAK_STAT1; ZZ_kf3*ZZ_STAT1*ZZ_pIFNG_R_JAK - ZZ_kr3*ZZ_pIFNG_R_JAK_STAT1;
  ZZ_v4: ZZ_pIFNG_R_JAK_STAT1 => ZZ_pSTAT1 + ZZ_pIFNG_R_JAK; ZZ_k4*ZZ_pIFNG_R_JAK_STAT1;
  ZZ_v5: 2 ZZ_pSTAT1 -> ZZ_pSTAT1D; ZZ_kf5*ZZ_pSTAT1^2 - ZZ_kr5*ZZ_pSTAT1D;
  ZZ_v6: ZZ_pSTAT1D => ZZ_pSTAT1D_n; ZZ_k6*ZZ_pSTAT1D;
  ZZ_v10: ZZ_pSTAT1D_n => ZZ_STAT1D_n; ZZ_k7*ZZ_pSTAT1D_n;
  ZZ_v8: ZZ_STAT1D_n => 2 ZZ_STAT1_n; ZZ_kr5*ZZ_STAT1D_n;
  ZZ_v9: ZZ_STAT1_n => ZZ_STAT1; ZZ_k9*ZZ_STAT1_n;
  ZZ_v7: ZZ_pSTAT1 => ZZ_STAT1; ZZ_k7*ZZ_pSTAT1;
  ZZ_v11: ZZ_SOCS1 + ZZ_IFNG_R_JAK -> ZZ_IFNG_R_JAK_SOCS1; ZZ_kf11*ZZ_SOCS1*ZZ_IFNG_R_JAK - ZZ_kr11*ZZ_IFNG_R_JAK_SOCS1;
  ZZ_v12: ZZ_pIFNG_R_JAK => ZZ_IFNG_R_lyso + ZZ_JAK; ZZ_k12*ZZ_pIFNG_R_JAK;
  ZZ_v13: ZZ_IFNG_R_JAK_SOCS1 => ZZ_SOCS1_JAK + ZZ_IFNG_R; ZZ_k13*ZZ_IFNG_R_JAK_SOCS1;
  ZZ_v14: ZZ_pSTAT1D + ZZ_IRF9 -> ZZ_pSTAT1D_IRF9; ZZ_kf14*ZZ_pSTAT1D*ZZ_IRF9 - ZZ_kr14*ZZ_pSTAT1D_IRF9;
  ZZ_v15: ZZ_pSTAT1D_IRF9 => ZZ_pSTAT1D_IRF9_n; ZZ_k15*ZZ_pSTAT1D_IRF9;
  ZZ_v16: ZZ_pSTAT1D_n + ZZ_IRF9_n -> ZZ_pSTAT1D_IRF9_n; ZZ_kf14*ZZ_pSTAT1D_n*ZZ_IRF9_n - ZZ_kr14*ZZ_pSTAT1D_IRF9_n;
  ZZ_v17: ZZ_pSTAT1D_IRF9_n + $ZZ_CXCL10_prod + nNFKB => ZZ_pSTAT1D_IRF9_n + ZZ_mCXCL10 + nNFKB; ZZ_k17*ZZ_pSTAT1D_IRF9_n^2*(0.004 + nNFKB/(nNFKB + ZZ_ka17))*ZZ_CXCL10_prod;
  ZZ_v18: ZZ_SOCS3 + ZZ_IFNG_R_JAK -> ZZ_IFNG_R_JAK_SOCS3; ZZ_kf18*ZZ_SOCS3*ZZ_IFNG_R_JAK - ZZ_kr11*ZZ_IFNG_R_JAK_SOCS3;
  ZZ_v19: ZZ_IFNG_R_JAK_SOCS3 => ZZ_SOCS3_JAK + ZZ_IFNG_R; ZZ_k13*ZZ_IFNG_R_JAK_SOCS3;
  ZZ_v20: $ZZ_SOCS3_prod + ZZ_pSTAT3D_n + ZZ_AP1_n => ZZ_SOCS3 + ZZ_pSTAT3D_n + ZZ_AP1_n; ZZ_k20*(ZZ_pSTAT3D_n/(ZZ_pSTAT3D_n + ZZ_ka20) + ZZ_AP1_n/(ZZ_AP1_n + ZZ_kb20))*ZZ_SOCS3_prod;
  ZZ_v21: ZZ_IFNG_R_lyso => ZZ_deg; ZZ_k21*ZZ_IFNG_R_lyso;
  ZZ_v22: ZZ_IL4 + ZZ_IL4R_JAK -> ZZ_IL4_R_JAK; ZZ_kf22*ZZ_IL4*ZZ_IL4R_JAK - ZZ_kr22*ZZ_IL4_R_JAK;
  ZZ_v23: ZZ_pIL4_R_JAK => ZZ_pIL4_R_JAK_i; ZZ_k23*ZZ_pIL4_R_JAK;
  ZZ_v24: ZZ_STAT6 + ZZ_pIL4_R_JAK_i -> ZZ_pIL4_R_JAK_STAT6; ZZ_kf24*ZZ_STAT6*ZZ_pIL4_R_JAK_i - ZZ_kr24*ZZ_pIL4_R_JAK_STAT6;
  ZZ_v25: ZZ_pIL4_R_JAK_STAT6 => ZZ_pSTAT6 + ZZ_pIL4_R_JAK_i; ZZ_k25*ZZ_pIL4_R_JAK_STAT6;
  ZZ_v26: ZZ_pSTAT6 => ZZ_STAT6; ZZ_k26*ZZ_pSTAT6;
  ZZ_v27: 2 ZZ_pSTAT6 -> ZZ_pSTAT6D; ZZ_kf27*ZZ_pSTAT6^2 - ZZ_kr5*ZZ_pSTAT6D;
  ZZ_v28: ZZ_pSTAT6D => ZZ_pSTAT6D_n; ZZ_k28*ZZ_pSTAT6D;
  ZZ_v29: ZZ_pSTAT6D_n => ZZ_STAT6D_n; ZZ_k26*ZZ_pSTAT6D_n;
  ZZ_v30: ZZ_STAT6D_n => 2 ZZ_STAT6_n; ZZ_kr5*ZZ_STAT6D_n;
  ZZ_v31: ZZ_STAT6_n => ZZ_STAT6; ZZ_k31*ZZ_STAT6_n;
  ZZ_v32: ZZ_SOCS1 + ZZ_pIL4_R_JAK_i -> ZZ_IL4_R_JAK_SOCS1_i; ZZ_kf11*ZZ_SOCS1*ZZ_pIL4_R_JAK_i - ZZ_kr11*ZZ_IL4_R_JAK_SOCS1_i;
  ZZ_v33: IL4R => ZZ_deg; ZZ_k33*IL4R;
  ZZ_v34: ZZ_IL4_R_lyso => ZZ_deg; ZZ_k34*ZZ_IL4_R_lyso;
  ZZ_v35: ZZ_SOCS3 + ZZ_pIL4_R_JAK_i -> ZZ_IL4_R_JAK_SOCS3_i; ZZ_kf35*ZZ_SOCS3*ZZ_pIL4_R_JAK_i - ZZ_kr11*ZZ_IL4_R_JAK_SOCS3_i;
  ZZ_v36: ZZ_IL4_R_JAK_SOCS3_i => ZZ_SOCS3_JAK + ZZ_IL4_R; ZZ_k13*ZZ_IL4_R_JAK_SOCS3_i;
  ZZ_v37: ZZ_SOCS3_JAK => ZZ_deg + ZZ_SOCS3; ZZ_k37*ZZ_SOCS3_JAK;
  ZZ_v38: $ZZ_IRF4_prod + ZZ_pSTAT6D_n + $ZZ_pAKT_t => ZZ_IRF4 + ZZ_pSTAT6D_n + $ZZ_pAKT_t; ZZ_k38*ZZ_pSTAT6D_n/(ZZ_pSTAT6D_n + ZZ_ka38)*ZZ_pAKT_t/(ZZ_pAKT_t + ZZ_kb38)*ZZ_IRF4_prod;
  ZZ_v39: IFNGR + ZZ_JAK -> ZZ_IFNGR_JAK; ZZ_kf39*IFNGR*ZZ_JAK - ZZ_kr39*ZZ_IFNGR_JAK;
  ZZ_v40: IL4R + ZZ_JAK -> ZZ_IL4R_JAK; ZZ_kf39*IL4R*ZZ_JAK - ZZ_kr40*ZZ_IL4R_JAK;
  ZZ_v41: ZZ_IL4_R_JAK_SOCS1_i => ZZ_IL4_R + ZZ_SOCS1_JAK; ZZ_k13*ZZ_IL4_R_JAK_SOCS1_i;
  ZZ_v42: ZZ_JAK + ZZ_IFNG_R -> ZZ_IFNG_R_JAK; ZZ_kf39*ZZ_JAK*ZZ_IFNG_R - ZZ_kr39*ZZ_IFNG_R_JAK;
  ZZ_v43: ZZ_IL4_R + ZZ_JAK -> ZZ_pIL4_R_JAK_i; ZZ_kf39*ZZ_IL4_R*ZZ_JAK - ZZ_kr40*ZZ_pIL4_R_JAK_i;
  ZZ_v44: $ZZ_IL10_prod + $ZZ_IRF9T + ZZ_pSTAT3D_n + ZZ_p50 + ZZ_AP1_n + ZZ_pCREB + ZZ_CEBPB + ZZ_pSTAT6D_n + ZZ_HIF1a_b_n + $ZZ_pAKT_t + ZZ_pSTAT1D_n => $ZZ_IRF9T + ZZ_pSTAT3D_n + ZZ_mIL10 + ZZ_p50 + ZZ_AP1_n + ZZ_pCREB + ZZ_CEBPB + ZZ_pSTAT6D_n + ZZ_HIF1a_b_n + $ZZ_pAKT_t + ZZ_pSTAT1D_n; ZZ_k44*((ZZ_AP1_n + ZZ_pCREB*0.2 + ZZ_CEBPB*0.01)/(ZZ_AP1_n + ZZ_pCREB*0.2 + ZZ_CEBPB*0.01 + ZZ_ka44))*ZZ_pSTAT3D_n/(ZZ_pSTAT3D_n + ZZ_kb44)*(ZZ_IRF9T + 15000)*(0.5 + ZZ_pSTAT6D_n/(ZZ_pSTAT6D_n + ZZ_kc44))*(ZZ_HIF1a_b_n^2 + ZZ_kd44)*(ZZ_pAKT_t/(ZZ_pAKT_t + ZZ_ke44))*ZZ_IL10_prod*(1 - ZZ_pSTAT1D_n/(ZZ_pSTAT1D_n + ZZ_kf44))*(0.01 + ZZ_p50/(ZZ_p50 + ZZ_kg44));
  ZZ_v45: ZZ_pSTAT3D_n + ZZ_pSTAT6D_n + $ZZ_ARG1_prod + ZZ_HIF1a_b_n + ZZ_HIF2a_b_n + ZZ_IRF4 + ZZ_TNFa_R + ZZ_CEBPB => ZZ_ARG1 + ZZ_HIF2a_b_n + ZZ_pSTAT6D_n + ZZ_HIF1a_b_n + ZZ_IRF4 + ZZ_TNFa_R + ZZ_CEBPB + ZZ_pSTAT3D_n; ZZ_k45*ZZ_pSTAT6D_n*ZZ_CEBPB*0.001/(ZZ_pSTAT6D_n*ZZ_CEBPB*0.001 + ZZ_ka45)*(ZZ_HIF1a_b_n + ZZ_HIF2a_b_n)^2*(ZZ_IRF4/(ZZ_IRF4 + ZZ_kb45))*(1.1 - ZZ_TNFa_R/(ZZ_TNFa_R + ZZ_kc45))*ZZ_ARG1_prod*(0.02 + ZZ_pSTAT3D_n/(ZZ_pSTAT3D_n + ZZ_kd45));
  ZZ_v46: $ZZ_IL12_prod + ZZ_IRF1 + ZZ_aIRF5 + nNFKB + ZZ_CEBPB + ZZ_AP1_n + ZZ_pSTAT3D_n => ZZ_IRF1 + ZZ_IL12 + ZZ_aIRF5 + nNFKB + ZZ_CEBPB + ZZ_AP1_n + ZZ_pSTAT3D_n; ZZ_k46*(ZZ_IRF1^2/(ZZ_IRF1^2 + ZZ_ka46) + 0.01)*ZZ_IL12_prod*(0.2 + ZZ_aIRF5/(ZZ_aIRF5 + ZZ_kb46))*(0.1 + nNFKB*ZZ_CEBPB*ZZ_AP1_n*1e-7/(nNFKB*ZZ_CEBPB*ZZ_AP1_n*1e-7 + ZZ_kc46))*(1 - ZZ_pSTAT3D_n/(ZZ_pSTAT3D_n + ZZ_kd46));
  ZZ_v47: ZZ_pSTAT1D_n + $ZZ_CXCL9_prod => ZZ_pSTAT1D_n + ZZ_CXCL9; ZZ_k47*ZZ_pSTAT1D_n^2*ZZ_CXCL9_prod;
  ZZ_v48: $ZZ_miR3473_prod + ZZ_IRF1 => ZZ_m3473b + ZZ_IRF1; ZZ_k48*(1 - ZZ_IRF1^2/(ZZ_IRF1^2 + ZZ_ka48))*ZZ_miR3473_prod;
  ZZ_v49: ZZ_mPTEN => ZZ_PTEN + ZZ_mPTEN; ZZ_k49*ZZ_mPTEN;
  ZZ_v50: ZZ_mPTEN + ZZ_m3473b -> ZZ_m3473b_mPTEN; ZZ_kf50*ZZ_mPTEN*ZZ_m3473b - ZZ_kr50*ZZ_m3473b_mPTEN;
  ZZ_v51: ZZ_m3473b_mPTEN => ZZ_m3473b + ZZ_deg; ZZ_k51*ZZ_m3473b_mPTEN;
  ZZ_v52: $ZZ_IRF1_prod + ZZ_pSTAT1D_n + ZZ_pSTAT6D_n + ZZ_pSTAT1D_IRF9_n => ZZ_IRF1 + ZZ_pSTAT1D_n + ZZ_pSTAT6D_n + ZZ_pSTAT1D_IRF9_n; ZZ_k52*((ZZ_pSTAT1D_n + ZZ_pSTAT1D_IRF9_n + 1)/(ZZ_pSTAT6D_n + 1))/((ZZ_pSTAT1D_n + ZZ_pSTAT1D_IRF9_n + 1)/(ZZ_pSTAT6D_n + 1) + ZZ_ka52)*ZZ_IRF1_prod;
  ZZ_v53: $ZZ_iNOS_prod + ZZ_HIF1a_b_n + ZZ_IRF1 + $ZZ_IRF9T + ZZ_CEBPB + nNFKB => ZZ_HIF1a_b_n + ZZ_IRF1 + ZZ_iNOS + $ZZ_IRF9T + ZZ_CEBPB + nNFKB; ZZ_iNOS_prod*ZZ_k53*(0.01 + ZZ_HIF1a_b_n/(ZZ_HIF1a_b_n + ZZ_ka53))*(ZZ_IRF1/(ZZ_IRF1 + ZZ_kb53))*(ZZ_IRF9T + 15000)*(0.02 + nNFKB/(nNFKB + ZZ_kc53))*(0.1 + ZZ_CEBPB/(ZZ_CEBPB + ZZ_kd53));
  ZZ_v54: $ZZ_HIF1a_prod + ZZ_m93 + nNFKB => ZZ_HIF1a + ZZ_m93 + nNFKB; ZZ_k54*(0.1 + nNFKB/(nNFKB + ZZ_ka54))*(1.4 - ZZ_m93/(ZZ_m93 + ZZ_kb54))*ZZ_HIF1a_prod;
  ZZ_v55: $ZZ_HIF2a_prod + ZZ_aPPARG => ZZ_HIF2a + ZZ_aPPARG; ZZ_HIF2a_prod*ZZ_k55*ZZ_aPPARG;
  ZZ_v56: $ZZ_PPARG_prod + ZZ_pSTAT6D_n => ZZ_PPARG + ZZ_pSTAT6D_n; ZZ_k56*(0.07 + ZZ_pSTAT6D_n/(ZZ_pSTAT6D_n + ZZ_ka56))*ZZ_PPARG_prod;
  ZZ_v57: ZZ_PPARG + $ZZ_pAKT_t => ZZ_aPPARG + $ZZ_pAKT_t; ZZ_k57*ZZ_PPARG*ZZ_pAKT_t;
  ZZ_v58: ZZ_HIF2a -> ZZ_HIF2a_n; ZZ_kf58*ZZ_HIF2a - ZZ_kr58*ZZ_HIF2a_n;
  ZZ_v59: ZZ_HIF1a -> ZZ_HIF1a_n; ZZ_kf58*ZZ_HIF1a - ZZ_kr58*ZZ_HIF1a_n;
  ZZ_v60: ZZ_HIF2a_n + ZZ_HIF1b_n -> ZZ_HIF2a_b_n; ZZ_kf60*ZZ_HIF2a_n*ZZ_HIF1b_n - ZZ_kr60*ZZ_HIF2a_b_n;
  ZZ_v61: ZZ_HIF1a_n + ZZ_HIF1b_n -> ZZ_HIF1a_b_n; ZZ_kf60*ZZ_HIF1a_n*ZZ_HIF1b_n - ZZ_kr60*ZZ_HIF1a_b_n;
  ZZ_v62: $ZZ_O2 + ZZ_aPHD -> ZZ_O2_aPHD; ZZ_kf62*ZZ_O2*ZZ_aPHD - ZZ_kr62*ZZ_O2_aPHD;
  ZZ_v63: ZZ_O2_aPHD + ZZ_HIF1a => ZZ_HIF1a_OH + ZZ_aPHD; ZZ_k63*ZZ_O2_aPHD*ZZ_HIF1a;
  ZZ_v64: ZZ_HIF2a + ZZ_O2_aPHD => ZZ_HIF2a_OH + ZZ_aPHD; ZZ_k64*ZZ_HIF2a*ZZ_O2_aPHD;
  ZZ_v65: ZZ_HIF1a_OH => ZZ_deg; ZZ_k65*ZZ_HIF1a_OH;
  ZZ_v66: ZZ_SOCS1_JAK => ZZ_SOCS1 + ZZ_deg; ZZ_k66*ZZ_SOCS1_JAK;
  ZZ_v67: ZZ_mIRF9 => ZZ_IRF9 + ZZ_mIRF9; ZZ_k67*ZZ_mIRF9;
  ZZ_v68: ZZ_m93 + ZZ_mIRF9 -> ZZ_m93_mIRF9; ZZ_kf50*ZZ_m93*ZZ_mIRF9 - ZZ_kr50*ZZ_m93_mIRF9;
  ZZ_v69: ZZ_m93_mIRF9 => ZZ_m93 + ZZ_deg; ZZ_k51*ZZ_m93_mIRF9;
  ZZ_v70: $ZZ_IRF9_prod => ZZ_mIRF9; ZZ_k70*ZZ_IRF9_prod;
  ZZ_v71: $ZZ_PTEN_prod => ZZ_mPTEN; ZZ_k71*ZZ_PTEN_prod;
  ZZ_v72: $ZZ_VEGF_prod + ZZ_m93 + ZZ_HIF1a_b_n + ZZ_HIF2a_b_n + ZZ_AP1_n + ZZ_pCREB => ZZ_V165a + ZZ_m93 + ZZ_HIF1a_b_n + ZZ_HIF2a_b_n + ZZ_AP1_n + ZZ_pCREB; ZZ_VEGF_prod*ZZ_k72*(0.1 + ZZ_HIF1a_b_n*ZZ_HIF2a_b_n/(ZZ_HIF1a_b_n*ZZ_HIF2a_b_n + ZZ_ka72))*(1.1 - ZZ_m93/(ZZ_m93 + ZZ_kb72))*(0.01 + ZZ_AP1_n/(ZZ_AP1_n + ZZ_kc72))*(ZZ_pCREB/(ZZ_pCREB + ZZ_kd72));
  ZZ_v73: $ZZ_IFNG_prod + ZZ_HIF1a_b_n + ZZ_pSTAT6D_n + ZZ_HIF2a_b_n + ZZ_IL12 + nNFKB + ZZ_pCREB + ZZ_AP1_n + ZZ_pSTAT3D_n => ZZ_IFNG + ZZ_HIF1a_b_n + ZZ_pSTAT6D_n + ZZ_HIF2a_b_n + ZZ_IL12 + nNFKB + ZZ_pCREB + ZZ_AP1_n + ZZ_pSTAT3D_n; ZZ_k73*(0.01 + (ZZ_HIF1a_b_n + ZZ_HIF2a_b_n)/(ZZ_HIF1a_b_n + ZZ_HIF2a_b_n + ZZ_ka73))*(1 - ZZ_pSTAT6D_n/(ZZ_pSTAT6D_n + ZZ_kb73))*ZZ_IFNG_prod*(0.1 + ZZ_IL12/(ZZ_IL12 + ZZ_kc73))*(0.1 + nNFKB/(nNFKB + ZZ_kd73))*(0.1 + ZZ_pCREB*ZZ_AP1_n/(ZZ_pCREB*ZZ_AP1_n + ZZ_ke73))*(1 - ZZ_pSTAT3D_n/(ZZ_pSTAT3D_n + ZZ_kf73));
  ZZ_v74: $ZZ_PHD_prod + ZZ_HIF1a_b_n + ZZ_HIF2a_b_n => ZZ_HIF2a_b_n + ZZ_HIF1a_b_n + ZZ_PHD; ZZ_k74*(ZZ_HIF1a_b_n^2/(ZZ_HIF1a_b_n^2 + ZZ_ka74)*ZZ_HIF2a_b_n^2/(ZZ_HIF2a_b_n^2 + ZZ_kb74))*ZZ_PHD_prod;
  ZZ_v75: ZZ_PHD => ZZ_deg; ZZ_k75*ZZ_PHD;
  ZZ_v76: ZZ_HIF1a_OH => ZZ_HIF1a; ZZ_k76*ZZ_HIF1a_OH;
  ZZ_v77: ZZ_HIF2a_OH => ZZ_HIF2a; ZZ_k76*ZZ_HIF2a_OH;
  ZZ_v78: ZZ_HIF2a_OH => ZZ_deg; ZZ_k65*ZZ_HIF2a_OH;
  ZZ_v79: $ZZ_miR93_prod + ZZ_TNFa_R + ZZ_pIFNG_R_JAK + ZZ_IL1b_R => ZZ_m93 + ZZ_TNFa_R + ZZ_pIFNG_R_JAK + ZZ_IL1b_R; ZZ_k79*(1 - ZZ_TNFa_R*ZZ_IL1b_R*ZZ_pIFNG_R_JAK^1/(ZZ_TNFa_R*ZZ_IL1b_R*ZZ_pIFNG_R_JAK^1 + ZZ_ka79))*ZZ_miR93_prod;
  ZZ_v80: $ZZ_IFNGR_prod => IFNGR; ZZ_k80*ZZ_IFNGR_prod*((IL8_R + kd_ifngr_p1)/(IL8_R_0 + kd_ifngr_p1))^n_ifngr_p1;  // modifiers: IL8_R
  ZZ_v81: IFNGR => ZZ_deg; ZZ_k81*IFNGR;
  ZZ_v82: ZZ_IFNG_R_lyso => ZZ_deg + IFNGR; ZZ_k82*ZZ_IFNG_R_lyso;
  ZZ_v83: ZZ_IL4_R_lyso => ZZ_deg + IL4R; ZZ_k82*ZZ_IL4_R_lyso;
  ZZ_v84: ZZ_IRF4 => ZZ_deg; ZZ_k84*ZZ_IRF4;
  ZZ_v85: ZZ_IRF1 => ZZ_deg; ZZ_k85*ZZ_IRF1;
  ZZ_v86: $ZZ_jak_prod => ZZ_JAK; ZZ_k86*ZZ_jak_prod;
  ZZ_v87: ZZ_JAK => ZZ_deg; ZZ_k87*ZZ_JAK;
  ZZ_v88: ZZ_mIRF9 => ZZ_deg; ZZ_k88*ZZ_mIRF9;
  ZZ_v89: ZZ_IRF9 => ZZ_deg; ZZ_k89*ZZ_IRF9;
  ZZ_v90: ZZ_m93 => ZZ_deg; ZZ_k90*ZZ_m93;
  ZZ_v91: ZZ_mPTEN => ZZ_deg; ZZ_k88*ZZ_mPTEN;
  ZZ_v92: ZZ_m3473b => ZZ_deg; ZZ_k92*ZZ_m3473b;
  ZZ_v93: ZZ_PTEN => ZZ_deg; ZZ_k93*ZZ_PTEN;
  ZZ_v94: ZZ_PHD -> ZZ_aPHD; ZZ_kr94*ZZ_PHD - ZZ_kf94*ZZ_aPHD;
  ZZ_v95: ZZ_mCXCL10 => ZZ_deg; ZZ_k95*ZZ_mCXCL10;
  ZZ_v96: ZZ_CXCL9 => ZZ_deg; ZZ_k96*ZZ_CXCL9;
  ZZ_v97: ZZ_IL12 => ZZ_deg; ZZ_k97*ZZ_IL12;
  ZZ_v98: ZZ_ARG1 => ZZ_deg; ZZ_k98*ZZ_ARG1;
  ZZ_v99: ZZ_iNOS => ZZ_deg; ZZ_k99*ZZ_iNOS;
  ZZ_v100: ZZ_SOCS3 => ZZ_deg; ZZ_k100*ZZ_SOCS3;
  ZZ_v101: ZZ_SOCS1 => ZZ_deg; ZZ_k101*ZZ_SOCS1;
  ZZ_v102: ZZ_IL4_R_JAK -> ZZ_pIL4_R_JAK; ZZ_kf102*ZZ_IL4_R_JAK - ZZ_kr102*ZZ_pIL4_R_JAK;
  ZZ_v103: ZZ_pIL4_R_JAK_i => ZZ_JAK + ZZ_IL4_R_lyso; ZZ_k103*ZZ_pIL4_R_JAK_i;
  ZZ_v104: $ZZ_IL4_prod => ZZ_IL4; ZZ_k104*ZZ_IL4_prod;
  ZZ_v105: ZZ_PPARG => ZZ_deg; ZZ_k105*ZZ_PPARG;
  ZZ_v106: ZZ_aPPARG => ZZ_PPARG; ZZ_k106*ZZ_aPPARG;
  ZZ_v107: ZZ_IL4_R_JAK_SOCS1_i => ZZ_IL4_R_lyso + ZZ_SOCS1 + ZZ_JAK; ZZ_k103*ZZ_IL4_R_JAK_SOCS1_i;
  ZZ_v108: ZZ_IL4_R => ZZ_IL4_R_lyso; ZZ_k103*ZZ_IL4_R;
  ZZ_v109: ZZ_IL4_R_JAK_SOCS3_i => ZZ_IL4_R_lyso + ZZ_JAK + ZZ_SOCS3; ZZ_k103*ZZ_IL4_R_JAK_SOCS3_i;
  ZZ_v110: ZZ_IL4_R_JAK + ZZ_SOCS1 -> ZZ_IL4_R_JAK_SOCS1; ZZ_kf11*ZZ_IL4_R_JAK*ZZ_SOCS1 - ZZ_kr11*ZZ_IL4_R_JAK_SOCS1;
  ZZ_v111: ZZ_IL4_R_JAK_SOCS1 => ZZ_JAK + ZZ_IL4_R_lyso + ZZ_SOCS1; ZZ_k111*ZZ_IL4_R_JAK_SOCS1;
  ZZ_v112: ZZ_IL4_R_JAK + ZZ_SOCS3 -> ZZ_IL4_R_JAK_SOCS3; ZZ_kf35*ZZ_IL4_R_JAK*ZZ_SOCS3 - ZZ_kr11*ZZ_IL4_R_JAK_SOCS3;
  ZZ_v113: ZZ_IL4_R_JAK_SOCS3 => ZZ_SOCS3 + ZZ_IL4_R_lyso + ZZ_JAK; ZZ_k111*ZZ_IL4_R_JAK_SOCS3;
  ZZ_v114: ZZ_aPPARG => ZZ_deg; ZZ_k105*ZZ_aPPARG;
  ZZ_v115: ZZ_IFNG_R_JAK_SOCS3 => ZZ_IFNG_R_lyso + ZZ_JAK + ZZ_SOCS3; ZZ_k12*ZZ_IFNG_R_JAK_SOCS3;
  ZZ_v116: ZZ_IFNG_R_JAK_SOCS1 => ZZ_IFNG_R_lyso + ZZ_JAK + ZZ_SOCS1; ZZ_k12*ZZ_IFNG_R_JAK_SOCS1;
  ZZ_v117: ZZ_pSTAT1D_IRF9_n => ZZ_IRF9_n + ZZ_STAT1D_n; ZZ_k117*ZZ_pSTAT1D_IRF9_n;
  ZZ_v118: $ZZ_TNFa_prod + ZZ_IRF1 + $ZZ_IRF9T + ZZ_AP1_n + nNFKB + ZZ_CEBPB + ZZ_aIRF5 + ZZ_pSTAT3D_n => ZZ_TNFa + ZZ_IRF1 + $ZZ_IRF9T + ZZ_AP1_n + nNFKB + ZZ_CEBPB + ZZ_aIRF5 + ZZ_pSTAT3D_n; ZZ_k118*(0.1 + ZZ_IRF1^2/(ZZ_IRF1^2 + ZZ_ka118))*(15000 + ZZ_IRF9T)*ZZ_TNFa_prod*(nNFKB*7*(ZZ_aIRF5/(ZZ_aIRF5 + 5000))^2 + ZZ_AP1_n*0.25 + ZZ_CEBPB*0.0016 - nNFKB*ZZ_CEBPB*8.5e-8)/(nNFKB*7*(ZZ_aIRF5/(ZZ_aIRF5 + 5000))^2 + ZZ_AP1_n*0.25 + ZZ_CEBPB*0.0016 - nNFKB*ZZ_CEBPB*8.5e-8 + 100000)*(1.1 - ZZ_pSTAT3D_n/(ZZ_pSTAT3D_n + ZZ_kb118));
  ZZ_v119: $ZZ_il4r_prod + ZZ_pSTAT3D_n => IL4R + ZZ_pSTAT3D_n; ZZ_k119*ZZ_il4r_prod*(0.05 + ZZ_pSTAT3D_n/(ZZ_pSTAT3D_n + ZZ_ka119));
  ZZ_v120: $ZZ_IRG1_prod + ZZ_IRF1 + ZZ_IRF9_n + ZZ_pSTAT1D_IRF9_n => ZZ_IRG1 + ZZ_IRF1 + ZZ_IRF9_n + ZZ_pSTAT1D_IRF9_n; ZZ_k120*ZZ_IRF1*(ZZ_IRF9_n + ZZ_pSTAT1D_IRF9_n)^2*ZZ_IRG1_prod;
  ZZ_v121: ZZ_IRG1 => ZZ_deg; ZZ_k121*ZZ_IRG1;
  ZZ_v122: $ZZ_Itaconate_prod + ZZ_IRG1 => ZZ_Itaconate + ZZ_IRG1; ZZ_k122*ZZ_IRG1^2*ZZ_Itaconate_prod;
  ZZ_v123: ZZ_Itaconate => ZZ_deg; ZZ_k123*ZZ_Itaconate;
  ZZ_v124: ZZ_IRF9 -> ZZ_IRF9_n; ZZ_k15*ZZ_IRF9 - ZZ_kr124*ZZ_IRF9_n;
  ZZ_v125: 2 ZZ_pSTAT3 -> ZZ_pSTAT3D; ZZ_kf125*ZZ_pSTAT3^2 - ZZ_kr125*ZZ_pSTAT3D;
  ZZ_v126: ZZ_pSTAT3D => ZZ_pSTAT3D_n; ZZ_k126*ZZ_pSTAT3D;
  ZZ_v130: ZZ_pSTAT3D_n => ZZ_STAT3D_n; ZZ_k127*ZZ_pSTAT3D_n;
  ZZ_v128: ZZ_STAT3D_n => 2 ZZ_STAT3_n; ZZ_kr125*ZZ_STAT3D_n;
  ZZ_v129: ZZ_STAT3_n => ZZ_STAT3; ZZ_k129*ZZ_STAT3_n;
  ZZ_v127: ZZ_pSTAT3 => ZZ_STAT3; ZZ_k127*ZZ_pSTAT3;
  ZZ_v131: ZZ_pSTAT1 + ZZ_pSTAT3 -> ZZ_pSTAT1_3; ZZ_kf131*ZZ_pSTAT1*ZZ_pSTAT3 - ZZ_kr5*ZZ_pSTAT1_3;
  ZZ_v132: ZZ_pSTAT1_3 => ZZ_pSTAT1_3_n; ZZ_k126*ZZ_pSTAT1_3;
  ZZ_v133: ZZ_pSTAT1_3_n => ZZ_STAT3_n + ZZ_STAT1_n; ZZ_k133*ZZ_pSTAT1_3_n;
  ZZ_v134: ZZ_pIFNG_R_JAK + ZZ_STAT3 => ZZ_pSTAT3 + ZZ_pIFNG_R_JAK; ZZ_k134*ZZ_pIFNG_R_JAK*ZZ_STAT3;
  ZZ_v135: ZZ_pSTAT1D_n + ZZ_pSTAT6D_n + ZZ_pSTAT3D_n + $ZZ_SOCS1_prod + ZZ_AP1_n => ZZ_pSTAT1D_n + ZZ_pSTAT6D_n + ZZ_pSTAT3D_n + ZZ_SOCS1 + ZZ_AP1_n; ZZ_k135*(0.1 + ZZ_pSTAT1D_n/ZZ_ka135 + ZZ_pSTAT6D_n/ZZ_kb135 + ZZ_pSTAT3D_n/ZZ_kc135 + (ZZ_AP1_n/ZZ_kd135)^2)*ZZ_SOCS1_prod;
  ZZ_v136: ZZ_PI3K + ZZ_pIL4_R_JAK + ZZ_pIL10_R_JAK + ZZ_pV165a_R1 + ZZ_IL1b_R + ZZ_IRAK4 + ZZ_pIRAK4 => ZZ_pPI3K + ZZ_pIL4_R_JAK + ZZ_pIL10_R_JAK + ZZ_pV165a_R1 + ZZ_IL1b_R + ZZ_IRAK4 + ZZ_pIRAK4; ZZ_k136*ZZ_PI3K*(ZZ_pIL4_R_JAK + ZZ_pIL10_R_JAK + ZZ_pV165a_R1*0.033 + ZZ_IL1b_R*(ZZ_IRAK4 + ZZ_pIRAK4)*3e-7 + 0.01);
  ZZ_v137: ZZ_pPI3K => ZZ_PI3K; ZZ_k137*ZZ_pPI3K;
  ZZ_v138: ZZ_AKT1 + ZZ_pPI3K + ZZ_PTEN => ZZ_pAKT1 + ZZ_PTEN + ZZ_pPI3K; ZZ_k138*ZZ_AKT1*ZZ_pPI3K*(1 - ZZ_PTEN/(ZZ_PTEN + ZZ_ka138));
  ZZ_v139: ZZ_AKT2 + ZZ_pPI3K + ZZ_PTEN => ZZ_pAKT2 + ZZ_pPI3K + ZZ_PTEN; ZZ_k138*ZZ_AKT2*ZZ_pPI3K*(1 - ZZ_PTEN/(ZZ_PTEN + ZZ_ka138));
  ZZ_v140: ZZ_pAKT1 => ZZ_AKT1; ZZ_k140*ZZ_pAKT1;
  ZZ_v141: ZZ_pAKT2 => ZZ_AKT2; ZZ_k140*ZZ_pAKT2;
  ZZ_v142: $ZZ_IL10R_prod => ZZ_IL10R; ZZ_k142*ZZ_IL10R_prod;
  ZZ_v143: ZZ_IL10R + ZZ_JAK -> ZZ_IL10R_JAK; ZZ_kf39*ZZ_IL10R*ZZ_JAK - ZZ_kr40*ZZ_IL10R_JAK;
  ZZ_v144: ZZ_IL10R_JAK + ZZ_IL10 -> ZZ_IL10_R_JAK; ZZ_kf144*ZZ_IL10R_JAK*ZZ_IL10 - ZZ_kr144*ZZ_IL10_R_JAK;
  ZZ_v145: ZZ_IL10_R_JAK -> ZZ_pIL10_R_JAK; ZZ_kf145*ZZ_IL10_R_JAK - ZZ_kr145*ZZ_pIL10_R_JAK;
  ZZ_v146: ZZ_pIL10_R_JAK + ZZ_STAT3 -> ZZ_pIL10_R_JAK_STAT3; ZZ_kf146*ZZ_pIL10_R_JAK*ZZ_STAT3 - ZZ_kr146*ZZ_pIL10_R_JAK_STAT3;
  ZZ_v147: ZZ_pIL10_R_JAK_STAT3 => ZZ_pSTAT3 + ZZ_pIL10_R_JAK; ZZ_k147*ZZ_pIL10_R_JAK_STAT3;
  ZZ_v148: ZZ_pIL10_R_JAK => ZZ_JAK + ZZ_IL10_R_lyso; ZZ_k148*ZZ_pIL10_R_JAK;
  ZZ_v149: ZZ_IL10_R_lyso => ZZ_deg + ZZ_IL10R; ZZ_k82*ZZ_IL10_R_lyso;
  ZZ_v150: ZZ_IL10_R_lyso => ZZ_deg; ZZ_k150*ZZ_IL10_R_lyso;
  ZZ_v151: ZZ_IL10_R_JAK + ZZ_SOCS1 -> ZZ_IL10_R_JAK_SOCS1; ZZ_kf11*ZZ_IL10_R_JAK*ZZ_SOCS1 - ZZ_kr11*ZZ_IL10_R_JAK_SOCS1;
  ZZ_v152: ZZ_IL10_R_JAK_SOCS1 => ZZ_IL10_R_lyso + ZZ_SOCS1 + ZZ_JAK; ZZ_k148*ZZ_IL10_R_JAK_SOCS1;
  ZZ_v153: ZZ_IL10_R_JAK_SOCS1 => ZZ_SOCS1_JAK + ZZ_IL10_R; ZZ_k13*ZZ_IL10_R_JAK_SOCS1;
  ZZ_v154: ZZ_IL10_R + ZZ_JAK -> ZZ_IL10R_JAK; ZZ_kf39*ZZ_IL10_R*ZZ_JAK - ZZ_kr40*ZZ_IL10R_JAK;
  ZZ_v155: ZZ_IL10R => ZZ_deg; ZZ_k155*ZZ_IL10R;
  ZZ_v156: ZZ_mIL10 => ZZ_IL10 + ZZ_mIL10; ZZ_k156*ZZ_mIL10;
  ZZ_v157: ZZ_mIL10 => ZZ_deg; ZZ_k157*ZZ_mIL10;
  ZZ_v158: ZZ_STAT1 => ZZ_deg; ZZ_k158*ZZ_STAT1;
  ZZ_v159: $ZZ_STAT1_prod + ZZ_m146b => ZZ_STAT1 + ZZ_m146b; ZZ_k159*ZZ_STAT1_prod*(1 - ZZ_m146b/(ZZ_m146b + ZZ_ka159));
  ZZ_v160: $ZZ_miR146b_prod + ZZ_pSTAT6D_n + ZZ_pSTAT3D_n + ZZ_CEBPB => ZZ_pSTAT6D_n + ZZ_pSTAT3D_n + ZZ_pre_m146b + ZZ_CEBPB; ZZ_k160*ZZ_miR146b_prod*(41.5*ZZ_pSTAT6D_n/(ZZ_pSTAT6D_n + ZZ_ka160) + ZZ_pSTAT3D_n*0.2)*(ZZ_CEBPB/(ZZ_CEBPB + ZZ_kb160));
  ZZ_v161: ZZ_m146b => ZZ_deg; ZZ_k161*ZZ_m146b;
  ZZ_v162: ZZ_pre_m146b => ZZ_deg; ZZ_k162*ZZ_pre_m146b;
  ZZ_v163: ZZ_pre_m146b => ZZ_m146b; ZZ_k163*ZZ_pre_m146b;
  ZZ_v164: $ZZ_mir155_prod + ZZ_pSTAT3D_n + nNFKB + ZZ_AP1_n + ZZ_pAKT2 + ZZ_pAKT1 => ZZ_pre_m155 + ZZ_pSTAT3D_n + nNFKB + ZZ_AP1_n + ZZ_pAKT2 + ZZ_pAKT1; ZZ_k164*ZZ_mir155_prod*(1 - ZZ_pSTAT3D_n/(ZZ_pSTAT3D_n + ZZ_ka164))*(ZZ_pAKT2 + 6000)*(1.2 - ZZ_pAKT1/(ZZ_pAKT1 + 10000))*(nNFKB + ZZ_kb164)*ZZ_AP1_n^2;
  ZZ_v165: ZZ_pre_m155 => ZZ_deg; ZZ_k165*ZZ_pre_m155;
  ZZ_v166: ZZ_pre_m155 => ZZ_m155; ZZ_k166*ZZ_pre_m155;
  ZZ_v167: ZZ_m155 => ZZ_deg; ZZ_k167*ZZ_m155;
  ZZ_v168: ZZ_CEBPB => ZZ_deg; ZZ_k168*ZZ_CEBPB;
  ZZ_v169: $ZZ_cebpb_prod + ZZ_m155 + ZZ_pCREB + ZZ_EGR2 => ZZ_CEBPB + ZZ_m155 + ZZ_pCREB + ZZ_EGR2; ZZ_k169*ZZ_cebpb_prod*(1.1 - ZZ_m155/(ZZ_m155 + ZZ_ka169))*ZZ_pCREB^2*(ZZ_EGR2 + ZZ_kb169);
  ZZ_v170: ZZ_TNFR + ZZ_TNFa -> ZZ_TNFa_R; ZZ_kf170*ZZ_TNFR*ZZ_TNFa - ZZ_kr170*ZZ_TNFa_R;
  ZZ_v171: ZZ_TNFa_R => ZZ_TNFa_R_lyso; ZZ_k171*ZZ_TNFa_R;
  ZZ_v172: ZZ_TNFa_R_lyso => ZZ_deg; ZZ_k172*ZZ_TNFa_R_lyso;
  ZZ_v173: ZZ_TNFa_R_lyso => ZZ_deg + ZZ_TNFR; ZZ_k173*ZZ_TNFa_R_lyso;
  ZZ_v174: ZZ_TNFR => ZZ_deg; ZZ_k174*ZZ_TNFR;
  ZZ_v175: ZZ_TNFa_R + ZZ_RIP1 => ZZ_aRIP1 + ZZ_TNFa_R; ZZ_k175*ZZ_TNFa_R*ZZ_RIP1;
  ZZ_v176: $ZZ_rip_prod => ZZ_RIP1; ZZ_k176*ZZ_rip_prod;
  ZZ_v177: ZZ_RIP1 => ZZ_deg; ZZ_k177*ZZ_RIP1;
  ZZ_v178: ZZ_aRIP1 + ZZ_A20 => ZZ_deg + ZZ_A20; ZZ_k178*ZZ_aRIP1*ZZ_A20/(ZZ_A20 + ZZ_ka178);
  ZZ_v179: ZZ_aRIP1 => ZZ_RIP1; ZZ_k179*ZZ_aRIP1;
  ZZ_v180: $ZZ_tnfr_prod => ZZ_TNFR; ZZ_k180*ZZ_tnfr_prod;
  ZZ_v181: ZZ_TAK1 + ZZ_aRIP1 + ZZ_aTRAF6 => ZZ_pTAK1 + ZZ_aRIP1 + ZZ_aTRAF6; ZZ_k181*ZZ_TAK1*(ZZ_aRIP1 + ZZ_aTRAF6*100);
  ZZ_v182: ZZ_pTAK1 => ZZ_TAK1; ZZ_k182*ZZ_pTAK1;
  ZZ_v183: ZZ_p38 + ZZ_pTAK1 => ZZ_pp38 + ZZ_pTAK1; ZZ_k183*ZZ_p38/(ZZ_p38 + ZZ_ka183)*ZZ_pTAK1;
  ZZ_v184: ZZ_pp38 => ZZ_p38; ZZ_k184*ZZ_pp38;
  ZZ_v185: ZZ_pp38 => ZZ_pp38_n; ZZ_k185*ZZ_pp38;
  ZZ_v186: ZZ_JNK + ZZ_pTAK1 => ZZ_pJNK + ZZ_pTAK1; ZZ_k186*ZZ_JNK/(ZZ_JNK + ZZ_ka186)*ZZ_pTAK1;
  ZZ_v187: ZZ_pJNK => ZZ_JNK; ZZ_k187*ZZ_pJNK;
  ZZ_v188: ZZ_pp38_n => ZZ_p38; ZZ_k188*ZZ_pp38_n;
  ZZ_v189: ZZ_IKK + ZZ_pTAK1 => ZZ_pIKK + ZZ_pTAK1; ZZ_k189*ZZ_IKK*ZZ_pTAK1^2;
  ZZ_v190: ZZ_pIKK => ZZ_IKK; ZZ_k190*ZZ_pIKK;
  ZZ_v191: $ZZ_ikk_prod => ZZ_IKK; ZZ_k191*ZZ_ikk_prod;
  ZZ_v192: ZZ_IKK + ZZ_O2_aPHD => ZZ_deg + ZZ_O2_aPHD; ZZ_k192*ZZ_IKK*ZZ_O2_aPHD^2;
  ZZ_v193: ZZ_pJNK_n => ZZ_JNK; ZZ_k193*ZZ_pJNK_n;
  ZZ_v194: ZZ_pJNK => ZZ_pJNK_n; ZZ_k185*ZZ_pJNK;
  ZZ_v195: ZZ_ERK + ZZ_pIKK + ZZ_aINT1 + ZZ_aINT2 + ZZ_pV165a_R1 => ZZ_pERK + ZZ_pIKK + ZZ_aINT1 + ZZ_aINT2 + ZZ_pV165a_R1; ZZ_k195*ZZ_ERK/(ZZ_ERK + ZZ_ka195)*(ZZ_pIKK + ZZ_aINT1*5 + ZZ_aINT2*10 + ZZ_pV165a_R1*3);
  ZZ_v196: ZZ_pERK => ZZ_pERK_n; ZZ_k185*ZZ_pERK;
  ZZ_v197: ZZ_pERK_n => ZZ_ERK; ZZ_k197*ZZ_pERK_n;
  ZZ_v198: ZZ_pERK => ZZ_ERK; ZZ_k198*ZZ_pERK;
  ZZ_v199: ZZ_V165a + ZZ_VEGFR1 -> ZZ_V165a_R1; ZZ_kf199*ZZ_V165a*ZZ_VEGFR1 - ZZ_kr199*ZZ_V165a_R1;
  ZZ_v200: ZZ_V165a_R1 -> ZZ_pV165a_R1; ZZ_kf200*ZZ_V165a_R1 - ZZ_kr200*ZZ_pV165a_R1;
  ZZ_v201: ZZ_pV165a_R1 => ZZ_V165_R1_lyso; ZZ_k201*ZZ_pV165a_R1;
  ZZ_v202: ZZ_V165_R1_lyso => ZZ_deg; ZZ_k202*ZZ_V165_R1_lyso;
  ZZ_v203: ZZ_V165_R1_lyso => ZZ_deg + ZZ_VEGFR1; ZZ_k203*ZZ_V165_R1_lyso;
  ZZ_v204: $ZZ_VEGF_prod => ZZ_V165b; ZZ_k204*ZZ_VEGF_prod;
  ZZ_v205: ZZ_V165b + ZZ_VEGFR1 -> ZZ_V165b_R1; ZZ_kf205*ZZ_V165b*ZZ_VEGFR1 - ZZ_kr205*ZZ_V165b_R1;
  ZZ_v206: ZZ_V165b_R1 => ZZ_V165_R1_lyso; ZZ_k206*ZZ_V165b_R1;
  ZZ_v207: ZZ_STAT3 + ZZ_pV165a_R1 -> ZZ_pV165a_R1_STAT3; ZZ_kf207*ZZ_STAT3*ZZ_pV165a_R1 - ZZ_kr207*ZZ_pV165a_R1_STAT3;
  ZZ_v208: ZZ_pV165a_R1_STAT3 => ZZ_pSTAT3 + ZZ_pV165a_R1; ZZ_k208*ZZ_pV165a_R1_STAT3;
  ZZ_v209: $ZZ_R1_prod => ZZ_VEGFR1; ZZ_k209*ZZ_R1_prod;
  ZZ_v210: ZZ_VEGFR1 => ZZ_deg; ZZ_k210*ZZ_VEGFR1;
  ZZ_v211: $ZZ_nfkb_prod => ZZ_p65; ZZ_k211*ZZ_nfkb_prod;
  ZZ_v212: $ZZ_nfkb_prod => ZZ_p50; ZZ_k212*ZZ_nfkb_prod;
  ZZ_v213: ZZ_p65 => ZZ_deg; ZZ_k213*ZZ_p65;
  ZZ_v214: ZZ_p50 => ZZ_deg; ZZ_k214*ZZ_p50;
  ZZ_v215: ZZ_p65 + ZZ_p50 -> NFKB; ZZ_kf215*ZZ_p65*ZZ_p50 - ZZ_kr215*NFKB;
  ZZ_v218: nNFKB + ZZ_IKB_n -> ZZ_IKB_NFKB_n; ZZ_kf216*nNFKB*ZZ_IKB_n - ZZ_kr216*ZZ_IKB_NFKB_n;
  ZZ_v217: ZZ_IKB_NFKB_n => ZZ_IKB_NFKB; ZZ_k217*ZZ_IKB_NFKB_n;
  ZZ_v216: NFKB + IKB -> ZZ_IKB_NFKB; ZZ_kf216*NFKB*IKB - ZZ_kr216*ZZ_IKB_NFKB;
  ZZ_v219: NFKB => nNFKB; ZZ_k219*NFKB;
  ZZ_v220: IKB -> ZZ_IKB_n; ZZ_kf220*IKB - ZZ_kr220*ZZ_IKB_n;
  ZZ_v221: $ZZ_Ikb_prod + nNFKB => IKB + nNFKB; ZZ_k221*ZZ_Ikb_prod*nNFKB*((M1_pH3S10 + kd_ikb_p)/(M1_pH3S10_0 + kd_ikb_p))^n_ikb_p;  // modifiers: M1_pH3S10, M1_pH3S10_0
  ZZ_v222: ZZ_IKB_NFKB + ZZ_pIKK => ZZ_pIKB + NFKB + ZZ_pIKK; ZZ_k222*ZZ_IKB_NFKB*ZZ_pIKK/(ZZ_pIKK + ZZ_ka222);
  ZZ_v223: ZZ_pIKB => ZZ_deg; ZZ_k223*ZZ_pIKB;
  ZZ_v224: nNFKB + ZZ_SOCS1 => ZZ_p50_n + ZZ_SOCS1; ZZ_k224*nNFKB*ZZ_SOCS1/(ZZ_SOCS1 + ZZ_ka224);
  ZZ_v225: ZZ_p50_n => ZZ_p50; ZZ_k225*ZZ_p50_n;
  ZZ_v226: IKB => deg; ZZ_k226*IKB*((M1_Mg_f_0 + kd_ikb_d)/(M1_Mg_f + kd_ikb_d))^n_ikb_d;  // modifiers: M1_Mg_f, M1_Mg_f_0
  ZZ_v227: ZZ_CREB + ZZ_pp38_n + $ZZ_pAKT_t => ZZ_pCREB + ZZ_pp38_n + $ZZ_pAKT_t; ZZ_k227*ZZ_CREB*(ZZ_pp38_n + ZZ_pAKT_t*0.3);
  ZZ_v228: ZZ_pCREB + ZZ_GSK3b => ZZ_CREB + ZZ_GSK3b; ZZ_k228*ZZ_pCREB*ZZ_GSK3b;
  ZZ_v229: ZZ_AP1_n => ZZ_deg; ZZ_k229*ZZ_AP1_n;
  ZZ_v230: $ZZ_ap1_prod + ZZ_pp38_n + ZZ_pJNK_n + ZZ_pERK_n + ZZ_GSK3b => ZZ_AP1_n + ZZ_pp38_n + ZZ_pJNK_n + ZZ_pERK_n + ZZ_GSK3b; ZZ_k230*ZZ_ap1_prod*(ZZ_pp38_n*0.01 + ZZ_pJNK_n*5 + ZZ_pERK_n*0.1)*(1.05 - ZZ_GSK3b/(ZZ_GSK3b + ZZ_ka230));
  ZZ_v231: ZZ_pIL4_R_JAK + ZZ_INT1 => ZZ_aINT1 + ZZ_pIL4_R_JAK; ZZ_k231*ZZ_pIL4_R_JAK*ZZ_INT1;
  ZZ_v232: ZZ_aINT1 => ZZ_INT1; ZZ_k232*ZZ_aINT1;
  ZZ_v233: $ZZ_egr2_prod + ZZ_pSTAT6D_n => ZZ_EGR2 + ZZ_pSTAT6D_n; ZZ_k233*ZZ_egr2_prod*(ZZ_pSTAT6D_n/(ZZ_pSTAT6D_n + ZZ_ka233));
  ZZ_v234: ZZ_EGR2 => ZZ_deg; ZZ_k234*ZZ_EGR2;
  ZZ_v235: ZZ_aINT2 => ZZ_INT2; ZZ_k235*ZZ_aINT2;
  ZZ_v236: ZZ_INT2 + ZZ_pIL10_R_JAK => ZZ_aINT2 + ZZ_pIL10_R_JAK; ZZ_k236*ZZ_INT2*ZZ_pIL10_R_JAK;
  ZZ_v237: $ZZ_a20_prod + ZZ_CEBPB + nNFKB => ZZ_A20 + ZZ_CEBPB + nNFKB; ZZ_k237*ZZ_a20_prod*ZZ_CEBPB*nNFKB;
  ZZ_v238: ZZ_A20 => ZZ_deg; ZZ_k238*ZZ_A20;
  ZZ_v239: $ZZ_il1b_prod + nNFKB + ZZ_AP1_n + ZZ_aIRF5 + ZZ_CEBPB + ZZ_AP1_n + ZZ_HIF2a_b_n + ZZ_HIF1a_b_n + ZZ_pSTAT3D_n + ZZ_pSTAT6D_n => ZZ_IL1b + nNFKB + ZZ_aIRF5 + ZZ_CEBPB + ZZ_AP1_n + ZZ_HIF1a_b_n + ZZ_HIF2a_b_n + ZZ_AP1_n + ZZ_pSTAT3D_n + ZZ_pSTAT6D_n; ZZ_k239*ZZ_il1b_prod*(nNFKB*ZZ_aIRF5*0.00033 + ZZ_AP1_n*ZZ_CEBPB*1e-5)/(nNFKB*ZZ_aIRF5*0.00033 + ZZ_AP1_n*ZZ_CEBPB*1e-5 + 30000)*(0.02 + (ZZ_HIF1a_b_n*ZZ_HIF2a_b_n)^2/((ZZ_HIF1a_b_n*ZZ_HIF2a_b_n)^2 + ZZ_ka239))*(1.5 - ZZ_pSTAT3D_n/(ZZ_pSTAT3D_n + ZZ_kb239))*(1.05 - ZZ_pSTAT6D_n^2/(ZZ_pSTAT6D_n^2 + ZZ_kc239));
  ZZ_v240: $ZZ_il1r_prod + ZZ_IRF1 => ZZ_IL1R + ZZ_IRF1; ZZ_k240*ZZ_il1r_prod*(1 - ZZ_IRF1/(ZZ_IRF1 + ZZ_ka240));
  ZZ_v241: ZZ_IL1R => ZZ_deg; ZZ_k241*ZZ_IL1R;
  ZZ_v242: ZZ_IL1R + ZZ_IL1b -> ZZ_IL1b_R; ZZ_kf242*ZZ_IL1R*ZZ_IL1b - ZZ_kr242*ZZ_IL1b_R;
  ZZ_v243: ZZ_IL1b_R => ZZ_IL1b_R_lyso; ZZ_k243*ZZ_IL1b_R;
  ZZ_v244: ZZ_IL1b_R_lyso => ZZ_deg; ZZ_k244*ZZ_IL1b_R_lyso;
  ZZ_v245: ZZ_IL1b_R_lyso => ZZ_deg + ZZ_IL1R; ZZ_k245*ZZ_IL1b_R_lyso;
  ZZ_v246: $ZZ_irak4_prod + ZZ_m93 => ZZ_IRAK4 + ZZ_m93; ZZ_k246*ZZ_irak4_prod*(1 - ZZ_m93/(ZZ_m93 + ZZ_ka246));
  ZZ_v247: ZZ_IRAK4 => ZZ_deg; ZZ_k247*ZZ_IRAK4;
  ZZ_v248: ZZ_IL1b_R + ZZ_TRAF6 + ZZ_A20 + ZZ_SOCS1 + ZZ_m146b + ZZ_IRAK4 + ZZ_pIRAK4 => ZZ_IL1b_R + ZZ_aTRAF6 + ZZ_A20 + ZZ_SOCS1 + ZZ_m146b + ZZ_IRAK4 + ZZ_pIRAK4; ZZ_k248*ZZ_IL1b_R*(ZZ_IRAK4 + ZZ_pIRAK4)*ZZ_TRAF6*(1.01 - ZZ_A20/(ZZ_A20 + ZZ_ka248))*(1 - ZZ_SOCS1/(ZZ_SOCS1 + ZZ_kb248))*(1.2 - ZZ_m146b/(ZZ_m146b + ZZ_kc248));
  ZZ_v249: ZZ_aTRAF6 => ZZ_TRAF6; ZZ_k249*ZZ_aTRAF6;
  ZZ_v250: ZZ_IL1Ra + ZZ_IL1R -> ZZ_IL1Ra_R; ZZ_kf242*ZZ_IL1Ra*ZZ_IL1R - ZZ_kr242*ZZ_IL1Ra_R;
  ZZ_v251: $ZZ_il1ra_prod + nNFKB + ZZ_CEBPB + ZZ_pSTAT6D_n + ZZ_pSTAT3D_n => ZZ_IL1Ra + nNFKB + ZZ_CEBPB + ZZ_pSTAT6D_n + ZZ_pSTAT3D_n; ZZ_k251*ZZ_il1ra_prod*(nNFKB*ZZ_CEBPB*0.0001/(nNFKB*ZZ_CEBPB*0.0001 + ZZ_ka251))*(0.1 + ZZ_pSTAT6D_n/(ZZ_pSTAT6D_n + ZZ_kb251))*(ZZ_pSTAT3D_n/(ZZ_pSTAT3D_n + ZZ_kc251));
  ZZ_v252: ZZ_IL1Ra => ZZ_deg; ZZ_k252*ZZ_IL1Ra;
  ZZ_v253: ZZ_aIRF5 => ZZ_IRF5; ZZ_k253*ZZ_aIRF5;
  ZZ_v254: ZZ_IRF5 + ZZ_pIKK + ZZ_pIRAK4 + ZZ_IRF4 => ZZ_aIRF5 + ZZ_pIKK + ZZ_pIRAK4 + ZZ_IRF4; ZZ_k254*ZZ_IRF5*(ZZ_pIKK*ZZ_pIRAK4/(ZZ_pIRAK4*ZZ_pIKK + ZZ_ka254))*(1.05 - ZZ_IRF4/(ZZ_IRF4 + ZZ_kb254));
  ZZ_v255: ZZ_IRAK4 + ZZ_IL1b_R => ZZ_pIRAK4 + ZZ_IL1b_R; ZZ_k255*ZZ_IRAK4*ZZ_IL1b_R^2;
  ZZ_v256: ZZ_pIRAK4 => ZZ_IRAK4; ZZ_k256*ZZ_pIRAK4;
  ZZ_v257: ZZ_GSK3b + ZZ_pAKT1 + ZZ_pAKT2 => ZZ_pGSK3b + ZZ_pAKT1 + ZZ_pAKT2; ZZ_k257*ZZ_GSK3b*(ZZ_pAKT1 + ZZ_pAKT2)^2;
  ZZ_v258: ZZ_pGSK3b => ZZ_GSK3b; ZZ_k258*ZZ_pGSK3b;
  _J0: $IL8R_prod -> IL8R; k_il8r_p;
  _J1: IL8R -> deg; k_il8r_d*IL8R;
  _J2: IL8 + IL8R -> IL8_R; k_il8_b*IL8*IL8R - k_il8_ub*IL8_R;
  _J3: $IL8_prod -> IL8; k_il8_p*((M1_pH3S10 + kd_il8_p1)/(M1_pH3S10_0 + kd_il8_p1))^n_il8_p1;  // modifiers: M1_pH3S10, M1_pH3S10_0
  _J4: IL8 -> deg; k_il8_d*IL8;
end
